25/09/2023
10:37
;; 1. Based on: 0
;; 2. Description:
;;    Binomial Model Example with Decay as f(DOSE)
$PROBLEM    Binomial Model Example
$DATA      binom.csv IGNORE=@
$INPUT      ID TIME DOSE DV
$PRED

BASEP = EXP(THETA(1))
BASEP = BASEP/(1+BASEP) * EXP(ETA(1))

TSLP = EXP(THETA(2)+ETA(2))
DSLP = EXP(THETA(3)+ETA(3))

Y = BASEP * (1-DSLP*(DOSE/125)*(1-(EXP(-TSLP*TIME)))) * (1 + EPS(1))

$THETA  -0.25 ; BASEP; ; LOGIT ;Baseline
 -0.7 ; TLSP; 1/h; LOG   ;Time slope
 -1.8 ; DLSP; 1/h; LOG   ;Dose slope
$OMEGA  0.09  ;   IIV BASE
 0.09  ;   IIV TSLP
 0.09  ;   IIV DSLP
$SIGMA  0.1  ;    Add RUV
$ESTIMATION METHOD=COND PRINT=5
$COVARIANCE UNCONDITIONAL
$TABLE      ID TIME DOSE DV PRED CWRES BASEP TSLP DSLP ONEHEADER
            NOPRINT FILE=sdtab1

NM-TRAN MESSAGES
 WARNINGS AND ERRORS (IF ANY) FOR PROBLEM    1
 (WARNING  2) NM-TRAN INFERS THAT THE DATA ARE POPULATION.
 (WARNING  13) WITH USER-WRITTEN PRED OR $PRED, NM-TRAN CANNOT APPEND THE
 MDV DATA ITEM.

1NONLINEAR MIXED EFFECTS MODEL PROGRAM (NONMEM) VERSION 7.4.3
 ORIGINALLY DEVELOPED BY STUART BEAL, LEWIS SHEINER, AND ALISON BOECKMANN
 CURRENT DEVELOPERS ARE ROBERT BAUER, ICON DEVELOPMENT SOLUTIONS,
 AND ALISON BOECKMANN. IMPLEMENTATION, EFFICIENCY, AND STANDARDIZATION
 PERFORMED BY NOUS INFOSYSTEMS.
 PROBLEM NO.:         1
 Binomial Model Example
 TOT. NO. OF OBS RECS:    28920
 TOT. NO. OF INDIVIDUALS:      120
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 #TBLN:      1
 #METH: First Order Conditional Estimation
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
 #TERM:
0MINIMIZATION TERMINATED
 DUE TO MAX. NO. OF FUNCTION EVALUATIONS EXCEEDED
 NO. OF FUNCTION EVALUATIONS USED:      376
 NO. OF SIG. DIGITS UNREPORTABLE

 ETABAR IS THE ARITHMETIC MEAN OF THE ETA-ESTIMATES,
 AND THE P-VALUE IS GIVEN FOR THE NULL HYPOTHESIS THAT THE TRUE MEAN IS 0.

 ETABAR:        -7.0515E-01  2.2709E-03  4.7234E-01
 SE:             8.2549E-03  1.8628E-04  3.8746E-02
 N:                     120         120         120

 P VAL.:         0.0000E+00  3.5906E-34  3.5973E-34

 ETASHRINKSD(%)  8.7827E+01  9.6111E+01  4.3903E+01
 ETASHRINKVR(%)  9.8518E+01  9.9849E+01  6.8531E+01
 EBVSHRINKSD(%)  8.5662E-01  9.5592E+01  3.6416E+01
 EBVSHRINKVR(%)  1.7059E+00  9.9806E+01  5.9570E+01
 EPSSHRINKSD(%)  1.4324E-01
 EPSSHRINKVR(%)  2.8628E-01


 TOTAL DATA POINTS NORMALLY DISTRIBUTED (N):        28920
 N*LOG(2PI) CONSTANT TO OBJECTIVE FUNCTION:    53151.404760558267
 OBJECTIVE FUNCTION VALUE WITHOUT CONSTANT:   -12155.576295833233
 OBJECTIVE FUNCTION VALUE WITH CONSTANT:       40995.828464725033
 REPORTED OBJECTIVE FUNCTION DOES NOT CONTAIN CONSTANT

 TOTAL EFFECTIVE ETAS (NIND*NETA):                           360


 #TERE:
 Elapsed estimation  time in seconds:    89.97
 Elapsed covariance  time in seconds:    28.19
 Elapsed postprocess time in seconds:     5.53

 ********************                        FIRST ORDER CONDITIONAL ESTIMATION                      ********************
 #OBJT:**************                       MINIMUM VALUE OF OBJECTIVE FUNCTION                      ********************
 #OBJV:********************************************   -12155.576       **************************************************

 ********************                        FIRST ORDER CONDITIONAL ESTIMATION                      ********************
 ********************                             FINAL PARAMETER ESTIMATE                           ********************

 THETA - VECTOR OF FIXED EFFECTS PARAMETERS   *********
         TH 1      TH 2      TH 3
         4.64E+00 -1.07E+01  5.84E+00

 OMEGA - COV MATRIX FOR RANDOM EFFECTS - ETAS  ********
         ETA1      ETA2      ETA3
 ETA1
+        5.57E-01
 ETA2
+        0.00E+00  2.78E-03
 ETA3
+        0.00E+00  0.00E+00  5.77E-01

 SIGMA - COV MATRIX FOR RANDOM EFFECTS - EPSILONS  ****
         EPS1
 EPS1
+        2.76E-01

 OMEGA - CORR MATRIX FOR RANDOM EFFECTS - ETAS  *******
         ETA1      ETA2      ETA3
 ETA1
+        7.46E-01
 ETA2
+        0.00E+00  5.27E-02
 ETA3
+        0.00E+00  0.00E+00  7.60E-01

 SIGMA - CORR MATRIX FOR RANDOM EFFECTS - EPSILONS  ***
         EPS1
 EPS1
+        5.25E-01

 ********************                        FIRST ORDER CONDITIONAL ESTIMATION                      ********************
 ********************                            STANDARD ERROR OF ESTIMATE                          ********************

 THETA - VECTOR OF FIXED EFFECTS PARAMETERS   *********
         TH 1      TH 2      TH 3
         7.48E-01  7.95E-01  8.27E-01

 OMEGA - COV MATRIX FOR RANDOM EFFECTS - ETAS  ********
         ETA1      ETA2      ETA3
 ETA1
+        1.78E-02
 ETA2
+       .........  1.05E-02
 ETA3
+       ......... .........  6.31E-02

 SIGMA - COV MATRIX FOR RANDOM EFFECTS - EPSILONS  ****
         EPS1
 EPS1
+        1.93E-03

 OMEGA - CORR MATRIX FOR RANDOM EFFECTS - ETAS  *******
         ETA1      ETA2      ETA3
 ETA1
+        1.20E-02
 ETA2
+       .........  9.95E-02
 ETA3
+       ......... .........  4.15E-02

 SIGMA - CORR MATRIX FOR RANDOM EFFECTS - EPSILONS  ***
         EPS1
 EPS1
+        1.83E-03

 ********************                        FIRST ORDER CONDITIONAL ESTIMATION                      ********************
 ********************                          COVARIANCE MATRIX OF ESTIMATE                         ********************

            TH 1      TH 2      TH 3      OM11      OM12      OM13      OM22      OM23      OM33      SG11
 TH 1
+        5.60E-01
 TH 2
+       -4.91E-01  6.32E-01
 TH 3
+        5.14E-01 -6.57E-01  6.84E-01
 OM11
+        6.50E-03 -5.35E-03  5.53E-03  3.19E-04
 OM12
+       ......... ......... ......... ......... .........
 OM13
+       ......... ......... ......... ......... ......... .........
 OM22
+       -7.39E-03  5.39E-03 -5.66E-03 -8.27E-05 ......... .........  1.10E-04
 OM23
+       ......... ......... ......... ......... ......... ......... ......... .........
 OM33
+       -1.34E-02  8.99E-03 -9.70E-03 -7.08E-04 ......... .........  8.53E-05 .........  3.98E-03
 SG11
+       -1.38E-03  1.03E-03 -1.08E-03 -1.77E-05 ......... .........  2.00E-05 .........  3.06E-05  3.71E-06

 ********************                        FIRST ORDER CONDITIONAL ESTIMATION                      ********************
 ********************                          CORRELATION MATRIX OF ESTIMATE                        ********************

            TH 1      TH 2      TH 3      OM11      OM12      OM13      OM22      OM23      OM33      SG11
 TH 1
+        7.48E-01
 TH 2
+       -8.25E-01  7.95E-01
 TH 3
+        8.31E-01 -1.00E+00  8.27E-01
 OM11
+        4.87E-01 -3.77E-01  3.74E-01  1.78E-02
 OM12
+       ......... ......... ......... ......... .........
 OM13
+       ......... ......... ......... ......... ......... .........
 OM22
+       -9.42E-01  6.46E-01 -6.52E-01 -4.42E-01 ......... .........  1.05E-02
 OM23
+       ......... ......... ......... ......... ......... ......... ......... .........
 OM33
+       -2.85E-01  1.79E-01 -1.86E-01 -6.29E-01 ......... .........  1.29E-01 .........  6.31E-02
 SG11
+       -9.61E-01  6.70E-01 -6.77E-01 -5.15E-01 ......... .........  9.92E-01 .........  2.52E-01  1.93E-03
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 Elapsed finaloutput time in seconds:     3.53
 #CPUT: Total CPU Time in Seconds,      126.672
