14/09/2023
12:24
;; 1. Based on: 101
;; 2. Description:
;;    PK model 1 cmt - WT-CL SEX-CL
;; 3. Label:
;;
;; 4. Structural model:
;; 5. Covariate model:
;; 6. Inter-individual variability:
;; 7. Inter-occasion variability:
;; 8. Residual variability:
;; 9. Estimation:
$PROBLEM    PK model 1 cmt base
$INPUT      ID TIME MDV EVID DV AMT SEX WT ETN
$DATA      acop.csv IGNORE=@
$SUBROUTINE ADVAN2 TRANS2
$PK
ET=1
IF(ETN.EQ.3) ET=1.3
KA = THETA(1)
CL = THETA(2)*(WT/70)**THETA(6)*( THETA(7)**SEX) *EXP(ETA(1))
V = THETA(3)*EXP(ETA(2))
SC=V

$THETA  (0,2) ; KA; 1/h; LIN ;  Absorption Rate Constant
 (0,20) ; CL; L/h; LIN ;Clearance
 (0,100) ; V2; L; LIN ;Volume of Distribution
 0.02 ; RUVp; ; LIN ;Proportional Error
 1 ; RUVa; ng/mL; LIN ;Additive Error
 (0,1) ; CL-WT; ; LIN ;Power Scalar CL-WT
 (0,1) ; CL-SEX; ; LIN ;Female CL Change
$OMEGA  0.05  ;     iiv CL  ;             ;   ;IIV(CL)
 0.2  ;     iiv V2  ;             ;   ;IIV(V2)
$SIGMA  1  FIX  ;       EPS1  ;             ;       ;RUV
$ERROR
IPRED = F
IRES = DV-IPRED
W = IPRED*THETA(4) + THETA(5)
IF (W.EQ.0) W = 1
IWRES = IRES/W
Y= IPRED+W*ERR(1)

$ESTIMATION METHOD=SAEM INTER NBURN=3000 NITER=500 PRINT=100
$ESTIMATION METHOD=IMP INTER EONLY=1 NITER=5 ISAMPLE=3000 PRINT=1
            SIGL=8 NOPRIOR=1
$ESTIMATION METHOD=1 INTER MAXEVAL=9999 SIG=3 PRINT=5 NOABORT POSTHOC
$COVARIANCE PRINT=E UNCONDITIONAL
$TABLE      ID TIME DV MDV EVID IPRED IWRES CWRES ONEHEADER NOPRINT
            FILE=sdtab103
$TABLE      ID CL V KA ETAS(1:LAST) ONEHEADER NOPRINT FILE=patab103
$TABLE      ID SEX ETN ONEHEADER NOPRINT FILE=catab103
$TABLE      ID WT ONEHEADER NOPRINT FILE=cotab103

NM-TRAN MESSAGES
 WARNINGS AND ERRORS (IF ANY) FOR PROBLEM    1
 (WARNING  2) NM-TRAN INFERS THAT THE DATA ARE POPULATION.

1NONLINEAR MIXED EFFECTS MODEL PROGRAM (NONMEM) VERSION 7.4.3
 ORIGINALLY DEVELOPED BY STUART BEAL, LEWIS SHEINER, AND ALISON BOECKMANN
 CURRENT DEVELOPERS ARE ROBERT BAUER, ICON DEVELOPMENT SOLUTIONS,
 AND ALISON BOECKMANN. IMPLEMENTATION, EFFICIENCY, AND STANDARDIZATION
 PERFORMED BY NOUS INFOSYSTEMS.
 PROBLEM NO.:         1
 PK model 1 cmt base
 TOT. NO. OF OBS RECS:      760
 TOT. NO. OF INDIVIDUALS:       40
 ONE COMPARTMENT MODEL WITH FIRST-ORDER ABSORPTION (ADVAN2)
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 #TBLN:      1
 #METH: Stochastic Approximation Expectation-Maximization
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
 #TERM:
 STOCHASTIC PORTION WAS NOT TESTED FOR CONVERGENCE
 REDUCED STOCHASTIC PORTION WAS COMPLETED

 ETABAR IS THE ARITHMETIC MEAN OF THE ETA-ESTIMATES,
 AND THE P-VALUE IS GIVEN FOR THE NULL HYPOTHESIS THAT THE TRUE MEAN IS 0.

 ETABAR:         8.7713E-03  4.2296E-02
 SE:             2.6118E-02  5.9825E-02
 N:                      40          40

 P VAL.:         7.3700E-01  4.7957E-01

 ETASHRINKSD(%)  1.3018E+01  1.3341E+00
 ETASHRINKVR(%)  2.4341E+01  2.6504E+00
 EBVSHRINKSD(%)  1.2877E+01  7.2200E-01
 EBVSHRINKVR(%)  2.4096E+01  1.4388E+00
 EPSSHRINKSD(%)  4.5195E+00
 EPSSHRINKVR(%)  8.8347E+00


 TOTAL DATA POINTS NORMALLY DISTRIBUTED (N):          760
 N*LOG(2PI) CONSTANT TO OBJECTIVE FUNCTION:    1396.7865704711026
 OBJECTIVE FUNCTION VALUE WITHOUT CONSTANT:    1653.8465738692071
 OBJECTIVE FUNCTION VALUE WITH CONSTANT:       3050.6331443403096
 REPORTED OBJECTIVE FUNCTION DOES NOT CONTAIN CONSTANT

 TOTAL EFFECTIVE ETAS (NIND*NETA):                            80
 NIND*NETA*LOG(2PI) CONSTANT TO OBJECTIVE FUNCTION:    147.03016531274761
 OBJECTIVE FUNCTION VALUE WITHOUT CONSTANT:    1653.8465738692071
 OBJECTIVE FUNCTION VALUE WITH CONSTANT:       1800.8767391819547
 REPORTED OBJECTIVE FUNCTION DOES NOT CONTAIN CONSTANT


 #TERE:
 Elapsed estimation  time in seconds:   129.18
 Elapsed covariance  time in seconds:     0.02

 ********************                STOCHASTIC APPROXIMATION EXPECTATION-MAXIMIZATION               ********************
 #OBJT:**************                        FINAL VALUE OF LIKELIHOOD FUNCTION                      ********************
 #OBJV:********************************************     1653.847       **************************************************

 ********************                STOCHASTIC APPROXIMATION EXPECTATION-MAXIMIZATION               ********************
 ********************                             FINAL PARAMETER ESTIMATE                           ********************

 THETA - VECTOR OF FIXED EFFECTS PARAMETERS   *********
         TH 1      TH 2      TH 3      TH 4      TH 5      TH 6      TH 7
         2.26E+00  7.26E+01  4.49E+02  7.20E-02  1.08E+00  7.40E-01  5.95E-01

 OMEGA - COV MATRIX FOR RANDOM EFFECTS - ETAS  ********
         ETA1      ETA2
 ETA1
+        3.70E-02
 ETA2
+        0.00E+00  1.51E-01

 SIGMA - COV MATRIX FOR RANDOM EFFECTS - EPSILONS  ****
         EPS1
 EPS1
+        1.00E+00

 OMEGA - CORR MATRIX FOR RANDOM EFFECTS - ETAS  *******
         ETA1      ETA2
 ETA1
+        1.92E-01
 ETA2
+        0.00E+00  3.88E-01

 SIGMA - CORR MATRIX FOR RANDOM EFFECTS - EPSILONS  ***
         EPS1
 EPS1
+        1.00E+00

 ********************                STOCHASTIC APPROXIMATION EXPECTATION-MAXIMIZATION               ********************
 ********************                          STANDARD ERROR OF ESTIMATE (S)                        ********************

 THETA - VECTOR OF FIXED EFFECTS PARAMETERS   *********
         TH 1      TH 2      TH 3      TH 4      TH 5      TH 6      TH 7
         6.43E-02  1.06E+01  3.07E+01  8.15E-03  9.80E-02  3.64E-01  5.06E-02

 OMEGA - COV MATRIX FOR RANDOM EFFECTS - ETAS  ********
         ETA1      ETA2
 ETA1
+        1.33E-02
 ETA2
+        0.00E+00  5.16E-02

 SIGMA - COV MATRIX FOR RANDOM EFFECTS - EPSILONS  ****
         EPS1
 EPS1
+        0.00E+00

 OMEGA - CORR MATRIX FOR RANDOM EFFECTS - ETAS  *******
         ETA1      ETA2
 ETA1
+        3.47E-02
 ETA2
+       .........  6.64E-02

 SIGMA - CORR MATRIX FOR RANDOM EFFECTS - EPSILONS  ***
         EPS1
 EPS1
+       .........

 ********************                STOCHASTIC APPROXIMATION EXPECTATION-MAXIMIZATION               ********************
 ********************                        COVARIANCE MATRIX OF ESTIMATE (S)                       ********************

            TH 1      TH 2      TH 3      TH 4      TH 5      TH 6      TH 7      OM11      OM12      OM22      SG11
 TH 1
+        4.14E-03
 TH 2
+        3.22E-02  1.12E+02
 TH 3
+        4.44E-01  9.03E-01  9.45E+02
 TH 4
+        6.34E-05  3.10E-02 -3.99E-02  6.64E-05
 TH 5
+       -9.25E-04  5.12E-03  9.48E-02 -5.92E-04  9.60E-03
 TH 6
+        1.56E-03  3.30E+00 -1.57E+00  1.20E-03 -1.34E-03  1.32E-01
 TH 7
+       -3.51E-04 -2.45E-01 -3.19E-01  3.19E-05 -3.75E-04 -3.39E-04  2.56E-03
 OM11
+        1.86E-04  1.32E-02 -6.23E-02 -1.94E-05  2.62E-04  6.33E-04 -1.14E-04  1.78E-04
 OM12
+       ......... ......... ......... ......... ......... ......... ......... ......... .........
 OM22
+       -3.26E-04  2.43E-02 -4.73E-01  3.65E-06  2.10E-04  2.31E-03  6.29E-05  1.47E-04  0.00E+00  2.66E-03
 SG11
+       ......... ......... ......... ......... ......... ......... ......... ......... ......... ......... .........

 ********************                STOCHASTIC APPROXIMATION EXPECTATION-MAXIMIZATION               ********************
 ********************                        CORRELATION MATRIX OF ESTIMATE (S)                      ********************

            TH 1      TH 2      TH 3      TH 4      TH 5      TH 6      TH 7      OM11      OM12      OM22      SG11
 TH 1
+        6.43E-02
 TH 2
+        4.73E-02  1.06E+01
 TH 3
+        2.24E-01  2.77E-03  3.07E+01
 TH 4
+        1.21E-01  3.59E-01 -1.59E-01  8.15E-03
 TH 5
+       -1.47E-01  4.93E-03  3.15E-02 -7.42E-01  9.80E-02
 TH 6
+        6.66E-02  8.56E-01 -1.41E-01  4.05E-01 -3.76E-02  3.64E-01
 TH 7
+       -1.08E-01 -4.58E-01 -2.05E-01  7.74E-02 -7.56E-02 -1.84E-02  5.06E-02
 OM11
+        2.17E-01  9.35E-02 -1.52E-01 -1.78E-01  2.00E-01  1.30E-01 -1.69E-01  1.33E-02
 OM12
+       ......... ......... ......... ......... ......... ......... ......... ......... .........
 OM22
+       -9.81E-02  4.44E-02 -2.98E-01  8.67E-03  4.15E-02  1.23E-01  2.41E-02  2.13E-01  0.00E+00  5.16E-02
 SG11
+       ......... ......... ......... ......... ......... ......... ......... ......... ......... ......... .........
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
 ********************                STOCHASTIC APPROXIMATION EXPECTATION-MAXIMIZATION               ********************
 ********************                    EIGENVALUES OF COR MATRIX OF ESTIMATE (S)                   ********************

             1         2         3         4         5         6         7         8         9
         2.72E-02  1.63E-01  4.86E-01  6.78E-01  8.48E-01  1.15E+00  1.55E+00  1.78E+00  2.32E+00
 #TBLN:      2
 #METH: Objective Function Evaluation by Importance Sampling (No Prior)
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
 #TERM:
 EXPECTATION ONLY PROCESS COMPLETED

 ETABAR IS THE ARITHMETIC MEAN OF THE ETA-ESTIMATES,
 AND THE P-VALUE IS GIVEN FOR THE NULL HYPOTHESIS THAT THE TRUE MEAN IS 0.

 ETABAR:         6.3149E-03  4.0618E-02
 SE:             2.6384E-02  5.9853E-02
 N:                      40          40

 P VAL.:         8.1084E-01  4.9737E-01

 ETASHRINKSD(%)  1.2131E+01  1.2890E+00
 ETASHRINKVR(%)  2.2791E+01  2.5615E+00
 EBVSHRINKSD(%)  1.3076E+01  7.1691E-01
 EBVSHRINKVR(%)  2.4442E+01  1.4287E+00
 EPSSHRINKSD(%)  4.6529E+00
 EPSSHRINKVR(%)  9.0893E+00


 TOTAL DATA POINTS NORMALLY DISTRIBUTED (N):          760
 N*LOG(2PI) CONSTANT TO OBJECTIVE FUNCTION:    1396.7865704711026
 OBJECTIVE FUNCTION VALUE WITHOUT CONSTANT:    2042.6563190717402
 OBJECTIVE FUNCTION VALUE WITH CONSTANT:       3439.4428895428427
 REPORTED OBJECTIVE FUNCTION DOES NOT CONTAIN CONSTANT

 TOTAL EFFECTIVE ETAS (NIND*NETA):                            80


 #TERE:
 Elapsed estimation  time in seconds:    13.98
 Elapsed covariance  time in seconds:   354.04

 ********************         OBJECTIVE FUNCTION EVALUATION BY IMPORTANCE SAMPLING (NO PRIOR)        ********************
 #OBJT:**************                        FINAL VALUE OF OBJECTIVE FUNCTION                       ********************
 #OBJV:********************************************     2042.656       **************************************************

 ********************         OBJECTIVE FUNCTION EVALUATION BY IMPORTANCE SAMPLING (NO PRIOR)        ********************
 ********************                             FINAL PARAMETER ESTIMATE                           ********************

 THETA - VECTOR OF FIXED EFFECTS PARAMETERS   *********
         TH 1      TH 2      TH 3      TH 4      TH 5      TH 6      TH 7
         2.26E+00  7.26E+01  4.49E+02  7.20E-02  1.08E+00  7.40E-01  5.95E-01

 OMEGA - COV MATRIX FOR RANDOM EFFECTS - ETAS  ********
         ETA1      ETA2
 ETA1
+        3.70E-02
 ETA2
+        0.00E+00  1.51E-01

 SIGMA - COV MATRIX FOR RANDOM EFFECTS - EPSILONS  ****
         EPS1
 EPS1
+        1.00E+00

 OMEGA - CORR MATRIX FOR RANDOM EFFECTS - ETAS  *******
         ETA1      ETA2
 ETA1
+        1.92E-01
 ETA2
+        0.00E+00  3.88E-01

 SIGMA - CORR MATRIX FOR RANDOM EFFECTS - EPSILONS  ***
         EPS1
 EPS1
+        1.00E+00

 ********************         OBJECTIVE FUNCTION EVALUATION BY IMPORTANCE SAMPLING (NO PRIOR)        ********************
 ********************                         STANDARD ERROR OF ESTIMATE (RSR)                       ********************

 THETA - VECTOR OF FIXED EFFECTS PARAMETERS   *********
         TH 1      TH 2      TH 3      TH 4      TH 5      TH 6      TH 7
         7.95E-02  3.88E+00  2.27E+01  8.12E-03  8.45E-02  1.23E-01  4.05E-02

 OMEGA - COV MATRIX FOR RANDOM EFFECTS - ETAS  ********
         ETA1      ETA2
 ETA1
+        1.23E-02
 ETA2
+        0.00E+00  2.43E-02

 SIGMA - COV MATRIX FOR RANDOM EFFECTS - EPSILONS  ****
         EPS1
 EPS1
+        0.00E+00

 OMEGA - CORR MATRIX FOR RANDOM EFFECTS - ETAS  *******
         ETA1      ETA2
 ETA1
+        3.21E-02
 ETA2
+       .........  3.13E-02

 SIGMA - CORR MATRIX FOR RANDOM EFFECTS - EPSILONS  ***
         EPS1
 EPS1
+       .........

 ********************         OBJECTIVE FUNCTION EVALUATION BY IMPORTANCE SAMPLING (NO PRIOR)        ********************
 ********************                       COVARIANCE MATRIX OF ESTIMATE (RSR)                      ********************

            TH 1      TH 2      TH 3      TH 4      TH 5      TH 6      TH 7      OM11      OM12      OM22      SG11
 TH 1
+        6.33E-03
 TH 2
+       -2.01E-02  1.50E+01
 TH 3
+       -1.73E-01 -1.19E+01  5.15E+02
 TH 4
+       -1.24E-04 -9.51E-03  5.57E-02  6.59E-05
 TH 5
+        1.32E-03  2.86E-02 -4.48E-01 -5.84E-04  7.13E-03
 TH 6
+        5.56E-05  3.04E-01  2.77E-01 -2.99E-04  6.27E-04  1.52E-02
 TH 7
+        2.15E-04 -4.45E-02  1.71E-01 -3.46E-05  7.14E-05  1.43E-03  1.64E-03
 OM11
+       -2.01E-04 -8.62E-03  7.41E-02  2.90E-05 -3.65E-04 -5.05E-05  1.26E-04  1.52E-04
 OM12
+       ......... ......... ......... ......... ......... ......... ......... ......... .........
 OM22
+        2.37E-04  1.98E-03  2.96E-02 -1.57E-05  1.29E-04 -1.52E-04  3.44E-05 -2.05E-05  0.00E+00  5.90E-04
 SG11
+       ......... ......... ......... ......... ......... ......... ......... ......... ......... ......... .........

 ********************         OBJECTIVE FUNCTION EVALUATION BY IMPORTANCE SAMPLING (NO PRIOR)        ********************
 ********************                       CORRELATION MATRIX OF ESTIMATE (RSR)                     ********************

            TH 1      TH 2      TH 3      TH 4      TH 5      TH 6      TH 7      OM11      OM12      OM22      SG11
 TH 1
+        7.95E-02
 TH 2
+       -6.52E-02  3.88E+00
 TH 3
+       -9.57E-02 -1.35E-01  2.27E+01
 TH 4
+       -1.92E-01 -3.02E-01  3.03E-01  8.12E-03
 TH 5
+        1.97E-01  8.74E-02 -2.34E-01 -8.52E-01  8.45E-02
 TH 6
+        5.67E-03  6.37E-01  9.91E-02 -2.99E-01  6.02E-02  1.23E-01
 TH 7
+        6.67E-02 -2.83E-01  1.86E-01 -1.05E-01  2.09E-02  2.86E-01  4.05E-02
 OM11
+       -2.05E-01 -1.80E-01  2.65E-01  2.89E-01 -3.50E-01 -3.33E-02  2.52E-01  1.23E-02
 OM12
+       ......... ......... ......... ......... ......... ......... ......... ......... .........
 OM22
+        1.23E-01  2.11E-02  5.38E-02 -7.96E-02  6.27E-02 -5.06E-02  3.49E-02 -6.86E-02  0.00E+00  2.43E-02
 SG11
+       ......... ......... ......... ......... ......... ......... ......... ......... ......... ......... .........
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
 ********************         OBJECTIVE FUNCTION EVALUATION BY IMPORTANCE SAMPLING (NO PRIOR)        ********************
 ********************                   EIGENVALUES OF COR MATRIX OF ESTIMATE (RSR)                  ********************

             1         2         3         4         5         6         7         8         9
         9.74E-02  1.54E-01  6.11E-01  7.31E-01  8.70E-01  1.05E+00  1.42E+00  1.58E+00  2.49E+00
 #TBLN:      3
 #METH: First Order Conditional Estimation with Interaction (No Prior)
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
 #TERM:
0MINIMIZATION SUCCESSFUL
 NO. OF FUNCTION EVALUATIONS USED:      234
 NO. OF SIG. DIGITS IN FINAL EST.:  3.2

 ETABAR IS THE ARITHMETIC MEAN OF THE ETA-ESTIMATES,
 AND THE P-VALUE IS GIVEN FOR THE NULL HYPOTHESIS THAT THE TRUE MEAN IS 0.

 ETABAR:         1.6346E-03 -2.1165E-03
 SE:             2.5835E-02  5.9657E-02
 N:                      40          40

 P VAL.:         9.4955E-01  9.7170E-01

 ETASHRINKSD(%)  1.2523E+01  1.0000E-10
 ETASHRINKVR(%)  2.3478E+01  1.0000E-10
 EBVSHRINKSD(%)  1.3194E+01  7.4530E-01
 EBVSHRINKVR(%)  2.4648E+01  1.4850E+00
 EPSSHRINKSD(%)  4.6579E+00
 EPSSHRINKVR(%)  9.0989E+00


 TOTAL DATA POINTS NORMALLY DISTRIBUTED (N):          760
 N*LOG(2PI) CONSTANT TO OBJECTIVE FUNCTION:    1396.7865704711026
 OBJECTIVE FUNCTION VALUE WITHOUT CONSTANT:    2041.8480064578339
 OBJECTIVE FUNCTION VALUE WITH CONSTANT:       3438.6345769289364
 REPORTED OBJECTIVE FUNCTION DOES NOT CONTAIN CONSTANT

 TOTAL EFFECTIVE ETAS (NIND*NETA):                            80


 #TERE:
 Elapsed estimation  time in seconds:     1.88
 Elapsed covariance  time in seconds:     1.97
 Elapsed postprocess time in seconds:     0.03

 ********************          FIRST ORDER CONDITIONAL ESTIMATION WITH INTERACTION (NO PRIOR)        ********************
 #OBJT:**************                       MINIMUM VALUE OF OBJECTIVE FUNCTION                      ********************
 #OBJV:********************************************     2041.848       **************************************************

 ********************          FIRST ORDER CONDITIONAL ESTIMATION WITH INTERACTION (NO PRIOR)        ********************
 ********************                             FINAL PARAMETER ESTIMATE                           ********************

 THETA - VECTOR OF FIXED EFFECTS PARAMETERS   *********
         TH 1      TH 2      TH 3      TH 4      TH 5      TH 6      TH 7
         2.27E+00  7.43E+01  4.68E+02  7.14E-02  1.09E+00  7.45E-01  5.87E-01

 OMEGA - COV MATRIX FOR RANDOM EFFECTS - ETAS  ********
         ETA1      ETA2
 ETA1
+        3.58E-02
 ETA2
+        0.00E+00  1.45E-01

 SIGMA - COV MATRIX FOR RANDOM EFFECTS - EPSILONS  ****
         EPS1
 EPS1
+        1.00E+00

 OMEGA - CORR MATRIX FOR RANDOM EFFECTS - ETAS  *******
         ETA1      ETA2
 ETA1
+        1.89E-01
 ETA2
+        0.00E+00  3.81E-01

 SIGMA - CORR MATRIX FOR RANDOM EFFECTS - EPSILONS  ***
         EPS1
 EPS1
+        1.00E+00

 ********************          FIRST ORDER CONDITIONAL ESTIMATION WITH INTERACTION (NO PRIOR)        ********************
 ********************                            STANDARD ERROR OF ESTIMATE                          ********************

 THETA - VECTOR OF FIXED EFFECTS PARAMETERS   *********
         TH 1      TH 2      TH 3      TH 4      TH 5      TH 6      TH 7
         8.05E-02  3.76E+00  2.83E+01  8.20E-03  8.59E-02  1.28E-01  4.00E-02

 OMEGA - COV MATRIX FOR RANDOM EFFECTS - ETAS  ********
         ETA1      ETA2
 ETA1
+        1.09E-02
 ETA2
+       .........  2.34E-02

 SIGMA - COV MATRIX FOR RANDOM EFFECTS - EPSILONS  ****
         EPS1
 EPS1
+       .........

 OMEGA - CORR MATRIX FOR RANDOM EFFECTS - ETAS  *******
         ETA1      ETA2
 ETA1
+        2.89E-02
 ETA2
+       .........  3.07E-02

 SIGMA - CORR MATRIX FOR RANDOM EFFECTS - EPSILONS  ***
         EPS1
 EPS1
+       .........

 ********************          FIRST ORDER CONDITIONAL ESTIMATION WITH INTERACTION (NO PRIOR)        ********************
 ********************                          COVARIANCE MATRIX OF ESTIMATE                         ********************

            TH 1      TH 2      TH 3      TH 4      TH 5      TH 6      TH 7      OM11      OM12      OM22      SG11
 TH 1
+        6.49E-03
 TH 2
+       -1.80E-02  1.41E+01
 TH 3
+       -1.45E-01 -2.22E+01  7.99E+02
 TH 4
+       -1.30E-04 -8.99E-03  6.43E-02  6.72E-05
 TH 5
+        1.44E-03  2.12E-02 -4.71E-01 -6.01E-04  7.37E-03
 TH 6
+        3.56E-04  3.18E-01  8.06E-02 -3.37E-04  8.27E-04  1.63E-02
 TH 7
+        2.35E-04 -2.66E-02  1.67E-01 -4.52E-05  1.10E-04  1.79E-03  1.60E-03
 OM11
+       -2.24E-04 -5.07E-03  4.19E-02  2.84E-05 -3.63E-04 -4.27E-05  1.02E-04  1.19E-04
 OM12
+       ......... ......... ......... ......... ......... ......... ......... ......... .........
 OM22
+        2.36E-04 -9.15E-04  9.05E-04 -1.88E-05  1.49E-04 -1.58E-04  4.89E-05 -4.51E-05 .........  5.47E-04
 SG11
+       ......... ......... ......... ......... ......... ......... ......... ......... ......... ......... .........

 ********************          FIRST ORDER CONDITIONAL ESTIMATION WITH INTERACTION (NO PRIOR)        ********************
 ********************                          CORRELATION MATRIX OF ESTIMATE                        ********************

            TH 1      TH 2      TH 3      TH 4      TH 5      TH 6      TH 7      OM11      OM12      OM22      SG11
 TH 1
+        8.05E-02
 TH 2
+       -5.94E-02  3.76E+00
 TH 3
+       -6.38E-02 -2.08E-01  2.83E+01
 TH 4
+       -1.97E-01 -2.92E-01  2.78E-01  8.20E-03
 TH 5
+        2.09E-01  6.56E-02 -1.94E-01 -8.54E-01  8.59E-02
 TH 6
+        3.46E-02  6.62E-01  2.24E-02 -3.22E-01  7.55E-02  1.28E-01
 TH 7
+        7.30E-02 -1.76E-01  1.47E-01 -1.38E-01  3.20E-02  3.50E-01  4.00E-02
 OM11
+       -2.55E-01 -1.23E-01  1.36E-01  3.17E-01 -3.87E-01 -3.07E-02  2.33E-01  1.09E-02
 OM12
+       ......... ......... ......... ......... ......... ......... ......... ......... .........
 OM22
+        1.25E-01 -1.04E-02  1.37E-03 -9.80E-02  7.40E-02 -5.30E-02  5.23E-02 -1.77E-01 .........  2.34E-02
 SG11
+       ......... ......... ......... ......... ......... ......... ......... ......... ......... ......... .........
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
 ********************          FIRST ORDER CONDITIONAL ESTIMATION WITH INTERACTION (NO PRIOR)        ********************
 ********************                      EIGENVALUES OF COR MATRIX OF ESTIMATE                     ********************

             1         2         3         4         5         6         7         8         9
         9.65E-02  1.52E-01  5.38E-01  8.35E-01  8.63E-01  1.04E+00  1.35E+00  1.62E+00  2.51E+00
 Elapsed finaloutput time in seconds:     0.39
 #CPUT: Total CPU Time in Seconds,      495.516
