14/09/2023
12:30
;; 1. Based on: 102
;; 2. Description:
;;    run105 - MAXEVAL 0
;; 3. Label:
;;
;; 4. Structural model:
;; 5. Covariate model:
;; 6. Inter-individual variability:
;; 7. Inter-occasion variability:
;; 8. Residual variability:
;; 9. Estimation:
$PROBLEM    PK model 1 cmt base
$INPUT      ID TIME MDV EVID DV AMT SEX WT ETN
$DATA      acop.csv IGNORE=@
$SUBROUTINE ADVAN2 TRANS2
$PK
ET=1
IF(ETN.EQ.3) ET=1.3
KA = THETA(1)
CL = THETA(2)*((WT/70)**THETA(6))*( THETA(7)**SEX) * EXP(ETA(1))
V = THETA(3)*EXP(ETA(2))
SC=V

$THETA  2.3 ; KA; 1/h; LIN ;Absorption Rate Constant
 78.1 ; CL; L/h; LIN ;Clearance
 462 ; V2; L; LIN ;Volume of Distribution
 0 FIX ; RUVp; ; LIN ;Proportional Error
 4.12 ; RUVa; ng/mL; LIN ;Additive Error
 0.75 FIX ; CL-WT; ; LIN ;Power Scalar CL-WT
 0.559 ; CL-SEX; ; LIN ;Female CL Change
$OMEGA  0.123188  ;     iiv CL
 0.1537040  ;     iiv V2
$SIGMA  1  FIX
$ERROR
IPRED = F
IRES = DV-IPRED
W = IPRED*THETA(4) + THETA(5)
IF (W.EQ.0) W = 1
IWRES = IRES/W
Y= IPRED+W*ERR(1)

$ESTIMATION METHOD=1 INTER MAXEVAL=0 SIG=3 PRINT=5 NOABORT POSTHOC
$COVARIANCE PRINT=E UNCONDITIONAL
$TABLE      ID TIME DV MDV EVID IPRED IWRES CWRES ONEHEADER NOPRINT
            FILE=sdtab106
$TABLE      ID CL V ONEHEADER NOPRINT FILE=patab106
$TABLE      ID SEX ETN ONEHEADER NOPRINT FILE=catab106
$TABLE      ID WT ONEHEADER NOPRINT FILE=cotab106

NM-TRAN MESSAGES
 WARNINGS AND ERRORS (IF ANY) FOR PROBLEM    1
 (WARNING  2) NM-TRAN INFERS THAT THE DATA ARE POPULATION.

1NONLINEAR MIXED EFFECTS MODEL PROGRAM (NONMEM) VERSION 7.4.3
 ORIGINALLY DEVELOPED BY STUART BEAL, LEWIS SHEINER, AND ALISON BOECKMANN
 CURRENT DEVELOPERS ARE ROBERT BAUER, ICON DEVELOPMENT SOLUTIONS,
 AND ALISON BOECKMANN. IMPLEMENTATION, EFFICIENCY, AND STANDARDIZATION
 PERFORMED BY NOUS INFOSYSTEMS.
 PROBLEM NO.:         1
 PK model 1 cmt base
 TOT. NO. OF OBS RECS:      760
 TOT. NO. OF INDIVIDUALS:       40
 ONE COMPARTMENT MODEL WITH FIRST-ORDER ABSORPTION (ADVAN2)
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 #TBLN:      1
 #METH: First Order Conditional Estimation with Interaction (Evaluation)
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 Elapsed evaluation time in seconds:     0.03
 Elapsed covariance  time in seconds:     1.14
 Elapsed postprocess time in seconds:     0.03

 ********************         FIRST ORDER CONDITIONAL ESTIMATION WITH INTERACTION (EVALUATION)       ********************
 #OBJT:**************                       MINIMUM VALUE OF OBJECTIVE FUNCTION                      ********************
 #OBJV:********************************************     2554.229       **************************************************

 ********************         FIRST ORDER CONDITIONAL ESTIMATION WITH INTERACTION (EVALUATION)       ********************
 ********************                             FINAL PARAMETER ESTIMATE                           ********************

 THETA - VECTOR OF FIXED EFFECTS PARAMETERS   *********
         TH 1      TH 2      TH 3      TH 4      TH 5      TH 6      TH 7
         2.30E+00  7.81E+01  4.62E+02  0.00E+00  4.12E+00  7.50E-01  5.59E-01

 OMEGA - COV MATRIX FOR RANDOM EFFECTS - ETAS  ********
         ETA1      ETA2
 ETA1
+        1.23E-01
 ETA2
+        0.00E+00  1.54E-01

 SIGMA - COV MATRIX FOR RANDOM EFFECTS - EPSILONS  ****
         EPS1
 EPS1
+        1.00E+00

 OMEGA - CORR MATRIX FOR RANDOM EFFECTS - ETAS  *******
         ETA1      ETA2
 ETA1
+        3.51E-01
 ETA2
+        0.00E+00  3.92E-01

 SIGMA - CORR MATRIX FOR RANDOM EFFECTS - EPSILONS  ***
         EPS1
 EPS1
+        1.00E+00

 ********************         FIRST ORDER CONDITIONAL ESTIMATION WITH INTERACTION (EVALUATION)       ********************
 ********************                            STANDARD ERROR OF ESTIMATE                          ********************

 THETA - VECTOR OF FIXED EFFECTS PARAMETERS   *********
         TH 1      TH 2      TH 3      TH 4      TH 5      TH 6      TH 7
         8.72E-02  4.21E+00  2.81E+01 .........  2.43E+00 .........  4.44E-02

 OMEGA - COV MATRIX FOR RANDOM EFFECTS - ETAS  ********
         ETA1      ETA2
 ETA1
+        8.91E-02
 ETA2
+       .........  2.78E-02

 SIGMA - COV MATRIX FOR RANDOM EFFECTS - EPSILONS  ****
         EPS1
 EPS1
+       .........

 OMEGA - CORR MATRIX FOR RANDOM EFFECTS - ETAS  *******
         ETA1      ETA2
 ETA1
+        1.27E-01
 ETA2
+       .........  3.54E-02

 SIGMA - CORR MATRIX FOR RANDOM EFFECTS - EPSILONS  ***
         EPS1
 EPS1
+       .........

 ********************         FIRST ORDER CONDITIONAL ESTIMATION WITH INTERACTION (EVALUATION)       ********************
 ********************                          COVARIANCE MATRIX OF ESTIMATE                         ********************

            TH 1      TH 2      TH 3      TH 4      TH 5      TH 6      TH 7      OM11      OM12      OM22      SG11
 TH 1
+        7.60E-03
 TH 2
+        1.05E-01  1.77E+01
 TH 3
+       -1.80E-01 -2.55E+01  7.88E+02
 TH 4
+       ......... ......... ......... .........
 TH 5
+        1.03E-01  7.57E+00 -1.89E+00 .........  5.89E+00
 TH 6
+       ......... ......... ......... ......... ......... .........
 TH 7
+       -9.05E-04 -1.35E-01  9.92E-02 ......... -6.21E-02 .........  1.97E-03
 OM11
+        3.28E-03  2.62E-01  3.46E-01 .........  2.08E-01 ......... -2.11E-03  7.93E-03
 OM12
+       ......... ......... ......... ......... ......... ......... ......... ......... .........
 OM22
+       -2.25E-05 -2.23E-02 -2.21E-02 ......... -2.26E-02 .........  2.59E-04 -7.95E-04 .........  7.70E-04
 SG11
+       ......... ......... ......... ......... ......... ......... ......... ......... ......... ......... .........

 ********************         FIRST ORDER CONDITIONAL ESTIMATION WITH INTERACTION (EVALUATION)       ********************
 ********************                          CORRELATION MATRIX OF ESTIMATE                        ********************

            TH 1      TH 2      TH 3      TH 4      TH 5      TH 6      TH 7      OM11      OM12      OM22      SG11
 TH 1
+        8.72E-02
 TH 2
+        2.85E-01  4.21E+00
 TH 3
+       -7.37E-02 -2.16E-01  2.81E+01
 TH 4
+       ......... ......... ......... .........
 TH 5
+        4.86E-01  7.41E-01 -2.77E-02 .........  2.43E+00
 TH 6
+       ......... ......... ......... ......... ......... .........
 TH 7
+       -2.34E-01 -7.21E-01  7.96E-02 ......... -5.77E-01 .........  4.44E-02
 OM11
+        4.23E-01  6.99E-01  1.38E-01 .........  9.65E-01 ......... -5.34E-01  8.91E-02
 OM12
+       ......... ......... ......... ......... ......... ......... ......... ......... .........
 OM22
+       -9.29E-03 -1.91E-01 -2.83E-02 ......... -3.35E-01 .........  2.11E-01 -3.22E-01 .........  2.78E-02
 SG11
+       ......... ......... ......... ......... ......... ......... ......... ......... ......... ......... .........
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
 ********************         FIRST ORDER CONDITIONAL ESTIMATION WITH INTERACTION (EVALUATION)       ********************
 ********************                      EIGENVALUES OF COR MATRIX OF ESTIMATE                     ********************

             1         2         3         4         5         6         7
         1.91E-02  1.85E-01  4.57E-01  7.73E-01  9.72E-01  1.13E+00  3.46E+00
 Elapsed finaloutput time in seconds:     0.31
 #CPUT: Total CPU Time in Seconds,        1.547
