19/08/2024
17:02
;; 1. Based on: 105
;; 2. Description:
;;    LAPLACE
;; 3. Label:
;;
;; 4. Structural model:
;; 5. Covariate model:
;; 6. Inter-individual variability:
;; 7. Inter-occasion variability:
;; 8. Residual variability:
;; 9. Estimation:

$PROBLEM PK model 1 cmt base

$INPUT ID TIME MDV EVID DV AMT  SEX WT ETN
$DATA acop.csv IGNORE=@
$SUBROUTINES ADVAN2 TRANS2

$PK
ET=1
IF(ETN.EQ.3) ET=1.3
KA = THETA(1)
CL = THETA(2)*((WT/70)**THETA(6))*( THETA(7)**SEX) * EXP(ETA(1))
V = THETA(3)*EXP(ETA(2))
SC=V

$THETA
2.3 ; KA ; 1/h ; LIN ; Absorption Rate Constant
80.1 ; CL ; L/h ; LIN ; Clearance
500 ; V2 ; L ; LIN ; Volume of Distribution
0 FIX  ; RUVp ;  ; LIN ; Proportional Error
4.12    ; RUVa ; ng/mL ; LIN ; Additive Error
0.75    ; CL-WT ;  ; LIN ; Power Scalar CL-WT
0.559   ; CL-SEX ; ; LIN ; Female CL Change

$OMEGA
0.123188     ; iiv CL
0.1537040     ; iiv V2

$SIGMA
1 FIX

$ERROR
IPRED = F
IRES = DV-IPRED
W = IPRED*THETA(4) + THETA(5)
IF (W.EQ.0) W = 1
IWRES = IRES/W
Y= IPRED+W*ERR(1)

$EST METHOD=1 INTER MAXEVAL=9999 SIG=3 PRINT=5 NOABORT POSTHOC LAPLACE
$COV PRINT=E UNCONDITIONAL

$TABLE ID TIME DV MDV EVID IPRED IWRES CWRES ONEHEADER NOPRINT FILE=sdtab107
$TABLE ID CL V ONEHEADER NOPRINT FILE=patab107
$TABLE ID SEX ETN ONEHEADER NOPRINT FILE=catab107
$TABLE ID WT ONEHEADER NOPRINT FILE=cotab107

NM-TRAN MESSAGES
 WARNINGS AND ERRORS (IF ANY) FOR PROBLEM    1
 (WARNING  2) NM-TRAN INFERS THAT THE DATA ARE POPULATION.
 (WARNING  87) WITH "LAPLACIAN" AND "INTERACTION", "NUMERICAL" AND "SLOW"
 ARE ALSO REQUIRED ON $ESTIM RECORD, AND "SLOW" IS REQUIRED ON $COV
 RECORD. NM-TRAN HAS SUPPLIED THESE OPTIONS.
Note: Analytical 2nd Derivatives are constructed in FSUBS but are never used.
      You may insert $ABBR DERIV2=NO after the first $PROB to save FSUBS construction and compilation time

1NONLINEAR MIXED EFFECTS MODEL PROGRAM (NONMEM) VERSION 7.5.1
 ORIGINALLY DEVELOPED BY STUART BEAL, LEWIS SHEINER, AND ALISON BOECKMANN
 CURRENT DEVELOPERS ARE ROBERT BAUER, ICON DEVELOPMENT SOLUTIONS,
 AND ALISON BOECKMANN. IMPLEMENTATION, EFFICIENCY, AND STANDARDIZATION
 PERFORMED BY NOUS INFOSYSTEMS.
 PROBLEM NO.:         1
 PK model 1 cmt base
 TOT. NO. OF OBS RECS:      760
 TOT. NO. OF INDIVIDUALS:       40
 ONE COMPARTMENT MODEL WITH FIRST-ORDER ABSORPTION (ADVAN2)
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 #TBLN:      1
 #METH: Laplacian Conditional Estimation with Interaction
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
 #TERM:
0MINIMIZATION SUCCESSFUL
 NO. OF FUNCTION EVALUATIONS USED:      244
 NO. OF SIG. DIGITS IN FINAL EST.:  3.4

 ETABAR IS THE ARITHMETIC MEAN OF THE ETA-ESTIMATES,
 AND THE P-VALUE IS GIVEN FOR THE NULL HYPOTHESIS THAT THE TRUE MEAN IS 0.

 ETABAR:         2.0529E-03 -2.3929E-03
 SE:             2.1415E-02  6.0748E-02
 N:                      40          40

 P VAL.:         9.2363E-01  9.6858E-01

 ETASHRINKSD(%)  2.1019E+01  1.0511E+00
 ETASHRINKVR(%)  3.7620E+01  2.0912E+00
 EBVSHRINKSD(%)  2.0892E+01  7.1049E-01
 EBVSHRINKVR(%)  3.7419E+01  1.4159E+00
 RELATIVEINF(%)  6.2523E+01  9.8492E+01
 EPSSHRINKSD(%)  4.3108E+00
 EPSSHRINKVR(%)  8.4357E+00


 TOTAL DATA POINTS NORMALLY DISTRIBUTED (N):          760
 N*LOG(2PI) CONSTANT TO OBJECTIVE FUNCTION:    1396.7865704711026
 OBJECTIVE FUNCTION VALUE WITHOUT CONSTANT:    2117.5636001389448
 OBJECTIVE FUNCTION VALUE WITH CONSTANT:       3514.3501706100474
 REPORTED OBJECTIVE FUNCTION DOES NOT CONTAIN CONSTANT

 TOTAL EFFECTIVE ETAS (NIND*NETA):                            80


 #TERE:
 Elapsed estimation  time in seconds:     6.21
 Elapsed covariance  time in seconds:     2.59
 Elapsed postprocess time in seconds:     0.05

 ********************                LAPLACIAN CONDITIONAL ESTIMATION WITH INTERACTION               ********************
 #OBJT:**************                       MINIMUM VALUE OF OBJECTIVE FUNCTION                      ********************
 #OBJV:********************************************     2117.564       **************************************************

 ********************                LAPLACIAN CONDITIONAL ESTIMATION WITH INTERACTION               ********************
 ********************                             FINAL PARAMETER ESTIMATE                           ********************

 THETA - VECTOR OF FIXED EFFECTS PARAMETERS   *********
         TH 1      TH 2      TH 3      TH 4      TH 5      TH 6      TH 7
         2.27E+00  7.37E+01  4.66E+02  0.00E+00 -2.11E+00  6.60E-01  5.75E-01

 OMEGA - COV MATRIX FOR RANDOM EFFECTS - ETAS  ********
         ETA1      ETA2
 ETA1
+        2.94E-02
 ETA2
+        0.00E+00  1.51E-01

 SIGMA - COV MATRIX FOR RANDOM EFFECTS - EPSILONS  ****
         EPS1
 EPS1
+        1.00E+00

 OMEGA - CORR MATRIX FOR RANDOM EFFECTS - ETAS  *******
         ETA1      ETA2
 ETA1
+        1.71E-01
 ETA2
+        0.00E+00  3.88E-01

 SIGMA - CORR MATRIX FOR RANDOM EFFECTS - EPSILONS  ***
         EPS1
 EPS1
+        1.00E+00

 ********************                LAPLACIAN CONDITIONAL ESTIMATION WITH INTERACTION               ********************
 ********************                            STANDARD ERROR OF ESTIMATE                          ********************

 THETA - VECTOR OF FIXED EFFECTS PARAMETERS   *********
         TH 1      TH 2      TH 3      TH 4      TH 5      TH 6      TH 7
         7.52E-02  3.43E+00  2.86E+01 .........  7.69E-02  1.33E-01  4.07E-02

 OMEGA - COV MATRIX FOR RANDOM EFFECTS - ETAS  ********
         ETA1      ETA2
 ETA1
+        1.14E-02
 ETA2
+       .........  2.41E-02

 SIGMA - COV MATRIX FOR RANDOM EFFECTS - EPSILONS  ****
         EPS1
 EPS1
+       .........

 OMEGA - CORR MATRIX FOR RANDOM EFFECTS - ETAS  *******
         ETA1      ETA2
 ETA1
+        3.32E-02
 ETA2
+       .........  3.10E-02

 SIGMA - CORR MATRIX FOR RANDOM EFFECTS - EPSILONS  ***
         EPS1
 EPS1
+       .........

 ********************                LAPLACIAN CONDITIONAL ESTIMATION WITH INTERACTION               ********************
 ********************                          COVARIANCE MATRIX OF ESTIMATE                         ********************

            TH 1      TH 2      TH 3      TH 4      TH 5      TH 6      TH 7      OM11      OM12      OM22      SG11
 TH 1
+        5.65E-03
 TH 2
+       -1.78E-02  1.18E+01
 TH 3
+       -2.00E-01 -2.57E+01  8.20E+02
 TH 4
+       ......... ......... ......... .........
 TH 5
+        2.20E-04  9.21E-02  7.45E-01 .........  5.91E-03
 TH 6
+       -6.68E-04  2.85E-01  4.06E-01 .........  5.60E-03  1.76E-02
 TH 7
+       -8.59E-05 -1.56E-02  2.33E-01 .........  1.23E-03  2.38E-03  1.65E-03
 OM11
+       -2.56E-04 -5.24E-03  4.93E-02 .........  8.83E-05  2.27E-04  1.52E-04  1.29E-04
 OM12
+       ......... ......... ......... ......... ......... ......... ......... ......... .........
 OM22
+        4.07E-04 -4.13E-03 -8.32E-02 ......... -5.21E-07 -1.05E-03 -1.68E-04 -8.65E-05 .........  5.81E-04
 SG11
+       ......... ......... ......... ......... ......... ......... ......... ......... ......... ......... .........

 ********************                LAPLACIAN CONDITIONAL ESTIMATION WITH INTERACTION               ********************
 ********************                          CORRELATION MATRIX OF ESTIMATE                        ********************

            TH 1      TH 2      TH 3      TH 4      TH 5      TH 6      TH 7      OM11      OM12      OM22      SG11
 TH 1
+        7.52E-02
 TH 2
+       -6.90E-02  3.43E+00
 TH 3
+       -9.30E-02 -2.62E-01  2.86E+01
 TH 4
+       ......... ......... ......... .........
 TH 5
+        3.81E-02  3.49E-01  3.38E-01 .........  7.69E-02
 TH 6
+       -6.69E-02  6.27E-01  1.07E-01 .........  5.49E-01  1.33E-01
 TH 7
+       -2.81E-02 -1.12E-01  2.00E-01 .........  3.93E-01  4.41E-01  4.07E-02
 OM11
+       -2.99E-01 -1.34E-01  1.52E-01 .........  1.01E-01  1.51E-01  3.29E-01  1.14E-02
 OM12
+       ......... ......... ......... ......... ......... ......... ......... ......... .........
 OM22
+        2.24E-01 -4.99E-02 -1.21E-01 ......... -2.81E-04 -3.27E-01 -1.72E-01 -3.15E-01 .........  2.41E-02
 SG11
+       ......... ......... ......... ......... ......... ......... ......... ......... ......... ......... .........
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
 ********************                LAPLACIAN CONDITIONAL ESTIMATION WITH INTERACTION               ********************
 ********************                      EIGENVALUES OF COR MATRIX OF ESTIMATE                     ********************

             1         2         3         4         5         6         7         8
         1.33E-01  3.23E-01  5.44E-01  7.64E-01  8.74E-01  1.29E+00  1.65E+00  2.42E+00
 Elapsed finaloutput time in seconds:     0.30
 #CPUT: Total CPU Time in Seconds,        4.406
