Thu Oct  6 17:52:08 CEST 2022
;; 1. Based on: 1297
;; 2. Description:
;;    spearate BEXP for TAP F1BUP for BR
;; 3. Label:
;;    Template Model IV+NB+FB EXPAREL
;; 4. Structural model:
;;    2 Cpt elim w/ Weibull / 1st order Abs separate for EXP and bupivacaine
;; 5. Covariate model:
;;    NONE
;; 6. Inter-individual variability:
;;    KAEXP, MDTEXP, F1EXP, BEXP, RBAEXP
;; 7. Inter-occasion variability:
;;    NONE
;; 8. Residual variability:
;;    Proportional and Additive
;; 9. Estimation:
;;    FOCE
$PROBLEM    Pacira PK Model Framework
$INPUT      STUDY OID ID DV EVID CMT TIME TAFD TAD BLQ DOSE AMT RACEN
            ETHNICN COUNTRYN SEXN HT WT AGE BMI COHORTN PEDS TRT PROCN
            INJLOC MDV IRFLAG BTYPE ADMIN NDOSE EXFLAG VOLEXPAND
            TOTVOL EXPARELDOSE BUPIHCLDOSE TOTBUPIAMT RATE DFLAG
            TRTFLAG STUDYARM RECID LIPODOSE
$DATA      nm_all6.csv IGNORE=@ IGNORE=(BLQ.EQ.1) IGNORE=(EXFLAG.NE.0)
            IGNORE=(STUDY.EQ.121) IGNORE=(TRT.GT.2)
$SUBROUTINE ADVAN13 TOL=10
$ABBREVIATED COMRES=1
$MODEL      COMP (EXPWB,DEFDOSE) COMP (EXPFOA) ; WB=Weibull FOA=First Order Absorption
            COMP (CENTRAL,DEFOBS) COMP (PERI) COMP (BUPWB)
            COMP(BUPFOA)
$PK

IF(NEWIND.NE.2) COM(1)=0
IF(EVID.EQ.1) COM(1)=TIME

STRT=1
IF(DOSE.GT.133.AND.STRT.LT.266) STRT=2
IF(DOSE.EQ.266) STRT=3
IF(DOSE.GT.266) STRT=4

; Block Type:     1 = SubQ (SUBC), 2 = Field Block (FB), 3 = Nerve Block (NB); 4 = Intrathecal (IT), 5 = Intravenous (IV)

; Administration: 1 = Abdominal (SUBC), 2 = Flank (SUBC), 3 = Ankle (NB), 4 = Spine (NB), 5 = Spine (FB)
;                 6 = Intercostal (NB), 7 = Hernia (FB), 8 = Knee (FB),  9 = Anus (FB)
;                 10 = Ankle (FB), 11 = Knee (femoral NB), 12 = Shoulder (NB), 13 = CARDIAC (FB)
;                 14 = LUMBAR (IT), 15 = BREAST (pectoralis NB), 16 = ARMVENE (IV), 17 = TAP (NB)
; Note: for Ankle, Knee and Spine surgery, both FB and NB have been studied

; ===== FLAGS ===== ;

SUBC                = 0
IF(BTYPE.EQ.1) SUBC = 1
FB                  = 0
IF(BTYPE.EQ.2) FB   = 1
NB                  = 0
IF(BTYPE.EQ.3) NB   = 1
IT                  = 0
IF(BTYPE.EQ.4) IT   = 1
IV                  = 0
IF(BTYPE.EQ.5) IV   = 1

; ===== NERVE BLOCK subclass ===== ;
FEM = 0
IF(STUDY.EQ.323) FEM=1
IF(STUDY.EQ.326) FEM=1

; ===== SURGERY TYPE ===== ;
AB = 0
IF(ADMIN.EQ.1) AB = 1
FL = 0
IF(ADMIN.EQ.2) FL = 1
ANKNB = 0
IF(ADMIN.EQ.3) ANKNB = 1
SPNB = 0
IF(ADMIN.EQ.4) SPNB = 1
SPFB = 0
IF(ADMIN.EQ.5) SPFB = 1
INNB = 0
IF(ADMIN.EQ.6) INNB = 1
HERFB = 0
IF(ADMIN.EQ.7) HERFB = 1
KNFB = 0
IF(ADMIN.EQ.8) KNFB = 1
ANUS = 0
IF(ADMIN.EQ.9) ANUS = 1
ANKFB = 0
IF(ADMIN.EQ.10) ANKFB = 1
KNNB = 0
IF(ADMIN.EQ.11) KNNB = 1
SHNB = 0
IF(ADMIN.EQ.12) SHNB = 1
CAR = 0
IF(ADMIN.EQ.13) CAR = 1
LUM = 0
IF(ADMIN.EQ.14) LUM=1
BR=0
IF(ADMIN.EQ.15) BR=1
ARMV=0
IF(ADMIN.EQ.16) ARMV=1
TAP=0
IF(ADMIN.EQ.17) TAP=1

ST2=0
IF(STUDY.EQ.2) ST2 = 1
ST118=0
IF(STUDY.EQ.118) ST118 = 1
ST120=0
IF(STUDY.EQ.120) ST120 = 1
ST122=0
IF(STUDY.EQ.122) ST122 = 1
ST203=0
IF(STUDY.EQ.203) ST203 = 1
ST323=0
IF(STUDY.EQ.323) ST323 = 1

; bupivacaine free base disposition - 2CMT
TVV1 = THETA(1)
TVCL = THETA(2)
TVV2 = THETA(3)
TVQ  = THETA(4)

; absorption EXPAREL
TVKAEXP = THETA(5)
TVMDTEXP= THETA(6)
TVF1EXP = THETA(7)
TVBEXP  = THETA(8)
TVRBAEXP= THETA(9)

; absorption bupivacaine
TVKABUP = THETA(10)
TVMDTBUP= THETA(11)
TVF1BUP = THETA(12)
TVBBUP  = THETA(13)
TVRBABUP= THETA(14)

; ===== ERROR ESTIMATES ===== ;

AERR = THETA(15)
PERR = THETA(16)

; ===== allometry model ===== ;

V_WT = THETA(17)
CL_WT = THETA(18)

; ===== covariates ===== ;

KAEXP_NB = THETA(19)
MDTEXP_NB = THETA(20)
F1EXP_NB = THETA(21)
BEXP_NB = THETA(22)
RBAEXP_NB = THETA(23)

KAEXP_FEM = THETA(24)
MDTEXP_FEM = THETA(25)
F1EXP_FEM = THETA(26)
BEXP_FEM = THETA(27)
RBAEXP_FEM = THETA(28)

MDTEXP_ANKNB = THETA(29)
MDTEXP_SPNB = THETA(30)
MDTEXP_SPFB = THETA(31)
MDTEXP_HERFB = THETA(32)
MDTEXP_ANUS = THETA(33)
MDTEXP_ANKFB = THETA(34)

RBAEXP_ANKNB = THETA(35)
RBAEXP_SPNB = THETA(36)
RBAEXP_KNFB = THETA(37)
RBAEXP_HERFB = THETA(38)
RBABUP_HERFB = THETA(39)
KABUP_HERFB = THETA(40)
F1EXP_ANUS = THETA(41)
F1EXP_SPFB = THETA(42)
F1EXP_ANKFB = THETA(43)
F1EXP_INNB = THETA(44)

KAEXP_ANKFB = THETA(45)
KAEXP_SPNB = THETA(46)
KAEXP_ANUS = THETA(47)

BEXP_SPNB = THETA(48)
RBAEXP_CAR = THETA(49)
MDTEXP_BR = THETA(50)

F1EXP_BR = THETA(51)
BEXP_BR = THETA(52)
RBAEXP_BR = THETA(53)

LDOSE_POW_F1=THETA(54)
LDOSE_POW_MDT=THETA(55)

KABUP_SPNB=THETA(64)
F1BUP_KNFB=THETA(56)
MDTBUP_KNFB=THETA(57)
F1BUP_SPNB=THETA(58)
F1BUP_ST2_ANKNB=THETA(59)
RBABUP_ST2_ANKNB=THETA(60)
MTDBUP_ANKNB=THETA(61)
F1BUP_SPFB=THETA(62)
MDTBUP_SPNB=THETA(63)
KABUP_SPNB=THETA(64)
MDTBUP_SPFB=THETA(65)
RBABUP_SPNB=THETA(66)

MDTEXP_TAP = THETA(67)
RBAEXP_ST2 = THETA(68)
RBAEXP_ST118 = THETA(69)
RBAEXP_ST120 = THETA(70)
F1EXP_ST2 = THETA(71)
MDTEXP_ST118 = THETA(72)
RBABUP_TAP = THETA(73)
F1EXP_TAP = THETA(74)

IIV_RBAEXP_FB = THETA(75)
IIV_RBAEXP_NB = THETA(76)

ST203_F1BUP = THETA(77)
ST203_F1EXP = THETA(78)

F1EXP_CAR = THETA(79)
BEXP_SHNB = THETA(80)
MDTEXP_SHNB = THETA(81)

IIV_KNEE_SCALAR = THETA(82)
KNEE=0
IF(KNFB.EQ.1.OR.KNNB.EQ.1) KNEE=1

BEXP_SPFB = THETA(83)
BEXP_ANUS = THETA(84)
BEXP_CAR = THETA(85)
MDTEXP_CAR = THETA(86)

BBUP_KNFB = THETA(87)

EARLY_PERR = 0
IF(TAD.LT.5) EARLY_PERR = THETA(88)
PERR = PERR + EARLY_PERR

MDTBUP_BR = THETA(89)
ST122_MDTEXP_ANKNB = THETA(90)
KAEXP_SHNB = THETA(91)
ST122_F1EXP_ANKNB = THETA(92)
ST122_BEXP_ANKNB = THETA(93)

ST323_F1EXP_KNNB =THETA(94)
BEXP_TAP = THETA(95)
F1BUP_BR = THETA(96)

 F1_DOSE     = (LIPODOSE/266)**LDOSE_POW_F1 - 1 ; centered around zero; F1 additive effect on logit scale
MDT_DOSE     = (LIPODOSE/266)**LDOSE_POW_MDT - 1 ; centered around zero; MDT additive on logit scale

KA_COV_EXP  = NB * KAEXP_NB +  FEM * KAEXP_FEM + KAEXP_ANKFB*ANKFB + KAEXP_SPNB*SPNB + KAEXP_ANUS*ANUS + KAEXP_SHNB*SHNB
MDT_COV_EXP = NB * MDTEXP_NB + FEM * MDTEXP_FEM + MDTEXP_ANKNB*ANKNB + MDTEXP_SPNB*SPNB + MDTEXP_SPFB*SPFB + MDTEXP_HERFB*HERFB + MDTEXP_ANUS*ANUS +MDTEXP_ANKFB*ANKFB + MDTEXP_BR*BR+MDT_DOSE + MDTEXP_TAP*TAP + ST118*MDTEXP_ST118+MDTEXP_SHNB*SHNB+MDTEXP_CAR*CAR+ST122_MDTEXP_ANKNB*ST122
F1_COV_EXP  = NB * F1EXP_NB +  FEM * F1EXP_FEM  + F1EXP_ANUS*ANUS + F1EXP_SPFB*SPFB + F1EXP_ANKFB*ANKFB + F1EXP_INNB *INNB + F1EXP_BR*BR +  F1_DOSE + ST2*F1EXP_ST2 + TAP*F1EXP_TAP + F1EXP_CAR*CAR + ST122_F1EXP_ANKNB*ST122 + ST203_F1EXP*ST203+ST323*ST323_F1EXP_KNNB
B_COV_EXP   = NB * BEXP_NB +   FEM * BEXP_FEM   + BEXP_SPNB*SPNB + BEXP_BR*BR + BEXP_SHNB*SHNB +BEXP_SPFB*SPFB+BEXP_ANUS*ANUS+BEXP_CAR*CAR+ST122_BEXP_ANKNB*ST122 + BEXP_TAP*TAP
RBA_COV_EXP = NB * RBAEXP_NB + FEM * RBAEXP_FEM + RBAEXP_ANKNB*ANKNB + RBAEXP_SPNB*SPNB + RBAEXP_KNFB*KNFB + RBAEXP_HERFB*HERFB + RBAEXP_CAR*CAR + RBAEXP_BR*BR + ST2*RBAEXP_ST2+ST118*RBAEXP_ST118+ST120*RBAEXP_ST120

KA_COV_BUP  = SPNB*KABUP_SPNB + KABUP_HERFB*HERFB
F1_COV_BUP  = KNFB*F1BUP_KNFB + SPNB*F1BUP_SPNB + F1BUP_ST2_ANKNB*ST2 + F1BUP_SPFB*SPFB + ST203_F1BUP*ST203 + F1BUP_BR*BR
MDT_COV_BUP = KNFB*MDTBUP_KNFB + MTDBUP_ANKNB*ANKNB + SPNB*MDTBUP_SPNB + SPFB*MDTBUP_SPFB + MDTBUP_BR*BR
B_COV_BUP   = BBUP_KNFB*KNFB
RBA_COV_BUP = RBABUP_ST2_ANKNB*ST2 + RBABUP_SPNB*SPNB + RBABUP_TAP*TAP + RBABUP_HERFB*HERFB

; ===== PARAMETERIZATIONS ===== ;

MU1 = TVV1 ; V1
MU2 = TVCL ; CL
MU3 = TVV2 ; V2
MU4 = TVQ  ; Q
MU5 = TVKAEXP  +  KA_COV_EXP; KAEXP
MU6 = TVMDTEXP + MDT_COV_EXP; MDTEXP
MU7 = TVF1EXP  +  F1_COV_EXP; F1EXP
MU8 = TVBEXP   +   B_COV_EXP; BEXP
MU9 = TVRBAEXP + RBA_COV_EXP; RBAEXP
MU10 = TVKABUP   + KA_COV_BUP ; KABUP
MU11 = TVMDTBUP  + MDT_COV_BUP; MDTBUP
MU12 = TVF1BUP   +  F1_COV_BUP; F1BUP
MU13 = TVBBUP    +   B_COV_BUP; BBUP
MU14 = TVRBABUP  + RBA_COV_BUP; RBABUP

V1      = EXP(MU1 + ETA(1)) * (WT/80) ** V_WT
CL      = EXP(MU2 + ETA(2)) * (WT/80) ** CL_WT
V2      = EXP(MU3 + ETA(3)) * (WT/80) ** V_WT
Q       = EXP(MU4 + ETA(4)) * (WT/80) ** CL_WT
KAEXP   = EXP(MU5 + ETA(5))
MDTEXP  = EXP(MU6 + ETA(6))
F1EXP   = EXP(MU7 + ETA(7))
BEXP    = EXP(MU8 + ETA(8)) + 1
RBAEXP  =     MU9 + ETA(9)*(IIV_RBAEXP_FB*FB+IIV_RBAEXP_NB*NB+KNEE*IIV_KNEE_SCALAR)
KABUP   = EXP(MU10 + ETA(10))
MDTBUP  = EXP(MU11 + ETA(11))
F1BUP   = EXP(MU12 + ETA(12))
BBUP    = EXP(MU13 + ETA(13)) + 1
RBABUP  =    (MU14 + ETA(14))

; ===== DOSE FRACTIONATION MODEL ===== ;

F1   = (F1EXP/(1+F1EXP)) * RBAEXP
F2   = (1 -  F1/RBAEXP)  * RBAEXP
F5   = (F1BUP/(1+F1BUP)) * RBABUP
F6   = (1 -  F5/RBABUP)  * RBABUP
IF(F1.LE.0) F1=1
IF(F2.LE.0) F2=1
IF(F5.LE.0) F5=1
IF(F6.LE.0) F6=1

; ===== DIFFERENTIAL EQUATIONS ===== ;

$DES
TDUMMY = COM(1)
TSTAR=T-COM(1)
IF(TSTAR.LT.0) TSTAR=0

KDEXP = BEXP/MDTEXP*(TSTAR/MDTEXP)**(BEXP-1)
KDBUP = BBUP/MDTBUP*(TSTAR/MDTBUP)**(BBUP-1)
IF(KDEXP.GT.100) KDEXP=100
IF(KDBUP.GT.100) KDBUP=100

C3 = A(3)/V1
C4 = A(4)/V2

DADT(1) = -KDEXP*A(1)
DADT(2) = -KAEXP*A(2)
DADT(3) =  KDEXP*A(1) + KAEXP*A(2) + KDBUP*A(5) + KABUP*A(6) - (CL/V1)*A(3) - Q*(C3-C4)
DADT(4) =                                                                     Q*(C3-C4)
DADT(5) = -KDBUP*A(5)
DADT(6) = -KABUP*A(6)

; ===== ERROR MODEL =====;

$ERROR
IPRED   = A(3)/V1
W       = sqrt(AERR**2 + PERR**2 * IPRED**2)
Y       = IPRED+W*EPS(1)
IRES    = DV - IPRED
IWRES   = IRES/W

; ====== SIMULATION BLOCK ===== ;

IF(ICALL.EQ.4) THEN
 IF(Y.LE.0.1) Y = .1
ENDIF

; ===== INITIAL ESTIMATES ===== ;

$THETA  3.66782 FIX ; V1; L; LOG
$THETA  3.64869 FIX ; CL; L/h; LOG
$THETA  3.99214 FIX ; V2; L; LOG
$THETA  3.73929 FIX ; Q; L/h; LOG
$THETA  (-5,0.570332,3) ; KAEXP; 5
$THETA  (0.1,3.71972,5) ; MDTEXP; 6
$THETA  (-5,3.366,5) ; F1EXP; 7
$THETA  (-2,-0.613705,1) ; BEXP; 8
$THETA  (0,2.51872,3) ; RBAEXP; 9
$THETA  (-3,0.135314,3) ; KABUP; 10
$THETA  (-1,3.08962,6) ; MDTBUP; 11
$THETA  (-10,1.10146,8) ; F1BUP; 12
$THETA  (-5,-0.99235,1.5) ; BBUP; 13
$THETA  (-2,2.21109,3) ; RBABUP; 14
$THETA  (0,2.83483,10) ; AERR; 15
$THETA  (0,0.209509,0.5) ; PERR; 16
$THETA  1 FIX ; V allometry - weight; 17
$THETA  0 FIX ; CL allometry - weight; 18
 -0.351923 ; KA_NB; 19
 0 FIX ; MDT_NB; 20
 -0.395746 ; F1_NB; 21
 0.179487 ; B_NB; 22
 0.669855 ; RBA_NB; 23
 -3.01265 ; KA_FEM; 24
 0.760767 ; MDT_FEM; 25
 -0.674964 ; F1_FEM; 26
 0.991774 ; B_FEM; 27
 3.06571 ; RBA_FEM; 28
 0.451144 ; MDTEXP_ANKNB; 29
 0 FIX ; MDTEXP_SPNB; 30
 -0.46448 ; MDTEXP_SPFB; 31
 -0.147077 ; MDTEXP_HERFB; 32
 -0.441692 ; MDTEXP_ANUS; 33
 0.260877 ; MDTEXP_ANKFB; 34
 0 FIX ; RBAEXP_ANKNB; 35
 -1.484 FIX ; RBAEXP_SPNB; 36
 0 FIX ; RBAEXP_KNFB; 37
 -0.272803 ; RBAEXP_HERFB; 38
 -0.319896 ; RBABUP_HERFB; 39
 0.409257 ; KABUP_HERFB; 40
 -0.965742 ; F1EXP_ANUS; 41
 -0.347749 ; F1EXP_SPFB; 42
 -0.776743 ; F1EXP_ANKFB; 43
 -0.464203 ; F1EXP_INNB; 44
 -1.89813 ; KAEXP_ANKFB; 45
 -1.48836 ; KAEXP_SPNB; 46
 0.63599 ; KAEXP_ANUS; 47
 -0.232555 ; BEXP_SPNB; 48
 2.39745 ; RBAEXP_CAR; 49
 0.131069 ; MDTEXP_BR; 50
 (-2,-0.469621,3) ; F1EXP_BR; 51
 0 FIX ; BEXP_BR; 52
 0 FIX ; RBAEXP_BR; 53
 (-1,0.650806,1) ; F1EXP_DOSE; 54
 (-1,0.280833,1) ; MDTEXP_DOSE; 55
$THETA  (-1,2.12665,5) ; F1BUP_KNFB; 56
$THETA  (-1,0.254342,5) ; MDTBUP_KNFB; 57
$THETA  (-3,-1.48812,2) ; F1BUP_SPNB; 58
$THETA  (-4,-1.0214,1) ; ST2_ANKNB_F1BUP; 59
$THETA  (-4,-1.09386,1) ; ST2_ANKNB_RBABUP; 60
$THETA  (-1,0.191069,5) ; MDTBUP_ANKNB; 61
$THETA  0 FIX ; F1BUP_SPFB; 62
$THETA  (-5,-0.56,2) FIX ; MDTBUP_SPNB; 63
$THETA  (-5,-0.717195,2) ; KABUP_SPNB; 64
$THETA  (-5,-0.49038,2) ; MDTBUP_SPFB; 65
$THETA  -0.530133 FIX ; RBABUP_SPNB; 66
$THETA  0.563285 ; MDTEXP_TAP; 67
$THETA  -1.95144 ; RBAEXP_ST2; 68
$THETA  -1.12712 FIX ; RBAEXP_ST118; 69
$THETA  -0.636002 FIX ; RBAEXP_ST120; 70
$THETA  -0.40486 ; F1EXP_ST2; 71
$THETA  -0.167351 ; MDTEXP_ST118; 72
$THETA  -1.23802 ; RBABUP_TAP; 73
$THETA  0.694525 FIX ; F1EXP_TAP; 74
$THETA  0.954398 ; IIV_RBAEXP_FB; 75
$THETA  1.43589 ; IIV_RBAEXP_NB; 76
$THETA  0.436359 ; ST203_F1BUP; 77
$THETA  1.10639 ; ST203_F1EXP; 78
$THETA  0.475375 ; F1EXP_CAR; 79
$THETA  0.417444 ; BEXP_SHNB; 80
$THETA  0.283592 ; MDTEXP_SHNB; 81
$THETA  0.836469 ; IIV_RBA_KNEE_SCALAR; 82
$THETA  -0.224963 ; BEXP_SPFB; 83
$THETA  -0.531897 ; BEXP_ANUS; 84
$THETA  0.367499 ; BEXP_CAR; 85
$THETA  0.222756 ; MDTEXP_CAR; 86
$THETA  0.555537 ; BBUP_KNFB; 87
$THETA  (0,0.0920383,1) ; EARLY_PERR; 88
$THETA  -0.894307 ; MDTBUP_BR; 89
$THETA  0.194327 ; ST122_MDTEXP_ANKNB; 90
$THETA  -2.18697 ; KAEXP_SHNB; 91
$THETA  1.30762 ; ST122_F1EXP_ANKNB; 92
$THETA  0.217745 ; ST122_BEXP_ANKNB; 93
$THETA  1.38821 ; ST323_F1EXP_KNNB; 94
$THETA  0.45 ; BEXP_TAP; 95
$THETA  -0.3 ; F1BUP_BR; 96
$OMEGA  0  FIX  ;     IIV_V1
$OMEGA  0  FIX  ;     IIV_CL
$OMEGA  0  FIX  ;     IIV_V2
$OMEGA  0  FIX  ;      IIV_Q
$OMEGA  0.426897  ;  IIV_KAEXP
$OMEGA  0.051008  ; IIV_MDTEXP
$OMEGA  0.417867  ;  IIV_F1EXP
$OMEGA  0.105034  ;   IIV_BEXP
$OMEGA  1  FIX  ; IIV_RBAEXP
$OMEGA  0.191193  ;  IIV_KABUP
$OMEGA  0.0647941  ; IIV_MDTBUP
$OMEGA  0.519368  ;  IIV_F1BUP
$OMEGA  0.0724198  ;   IIV_BBUP
$OMEGA  0.76575  ; IIV_RBABUP
$SIGMA  1.0  FIX  ;  SIGMA_RES
$ESTIMATION METHOD=COND INTER NSIG=3 SIGL=9 MAXEVALS=9999 PRINT=1
            NOABORT
$COVARIANCE PRINT=E UNCONDITIONAL MATRIX=S
$TABLE      ID TIME TAD TAFD PRED IPRED RES IRES WRES IWRES CWRES DV
            EVID TSTAR TDUMMY ONEHEADER NOAPPEND NOPRINT
            FILE=sdtab1298
$TABLE      ID OID DOSE V1 CL V2 Q KAEXP MDTEXP F1EXP BEXP RBAEXP
            KAEXP MDTBUP F1BUP BBUP RBABUP SUBC FB NB IV IT KDEXP
            KDBUP AERR PERR ETAS(1:LAST) STUDY DOSE RACEN ETHNICN SEXN
            COUNTRYN HT WT BMI AGE COHORTN PROCN INJLOC BTYPE ADMIN
            MDV TRTFLAG TRT IRFLAG BLQ PEDS NDOSE EXFLAG VOLEXPAND
            TOTVOL EXPARELDOSE BUPIHCLDOSE TOTBUPIAMT LIPODOSE RATE
            DFLAG STUDYARM RECID ONEHEADER NOAPPEND NOPRINT
            FILE=patab1298

NM-TRAN MESSAGES
 WARNINGS AND ERRORS (IF ANY) FOR PROBLEM    1
 (WARNING  2) NM-TRAN INFERS THAT THE DATA ARE POPULATION.
 (WARNING  48) DES-DEFINED ITEMS ARE COMPUTED ONLY WHEN EVENT TIME
 INCREASES. E.G., DISPLAYED VALUES ASSOCIATED WITH THE FIRST EVENT RECORD
 OF AN INDIVIDUAL RECORD ARE COMPUTED WITH (THE LAST ADVANCE TO) AN EVENT
 TIME OF THE PRIOR INDIVIDUAL RECORD.
 (WARNING  27) THE ABBREVIATED CODE CONTAINS A SIMULATION BLOCK BUT THERE IS
 NO $SIMULATION RECORD.

1NONLINEAR MIXED EFFECTS MODEL PROGRAM (NONMEM) VERSION 7.4.3
 ORIGINALLY DEVELOPED BY STUART BEAL, LEWIS SHEINER, AND ALISON BOECKMANN
 CURRENT DEVELOPERS ARE ROBERT BAUER, ICON DEVELOPMENT SOLUTIONS,
 AND ALISON BOECKMANN. IMPLEMENTATION, EFFICIENCY, AND STANDARDIZATION
 PERFORMED BY NOUS INFOSYSTEMS.
 PROBLEM NO.:         1
 Pacira PK Model Framework
 TOT. NO. OF OBS RECS:     9826
 TOT. NO. OF INDIVIDUALS:      909
 GENERAL NONLINEAR KINETICS MODEL WITH STIFF/NONSTIFF EQUATIONS (LSODA, ADVAN13)
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 #TBLN:      1
 #METH: First Order Conditional Estimation with Interaction
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
 #TERM:
0MINIMIZATION TERMINATED
 DUE TO ROUNDING ERRORS (ERROR=134)
 NO. OF FUNCTION EVALUATIONS USED:     9429
 NO. OF SIG. DIGITS UNREPORTABLE

 ETABAR IS THE ARITHMETIC MEAN OF THE ETA-ESTIMATES,
 AND THE P-VALUE IS GIVEN FOR THE NULL HYPOTHESIS THAT THE TRUE MEAN IS 0.

 ETABAR:         0.0000E+00  0.0000E+00  0.0000E+00  0.0000E+00 -3.1917E-03 -5.4004E-03 -2.5749E-02  4.1570E-02 -1.5250E-02  2.8748E-04
                -5.3582E-04 -2.3954E-03  5.1736E-03 -2.3712E-03
 SE:             0.0000E+00  0.0000E+00  0.0000E+00  0.0000E+00  1.4350E-02  6.3100E-03  1.6279E-02  7.9544E-03  2.9369E-02  4.1652E-03
                 2.9979E-03  8.5814E-03  1.9539E-03  1.1767E-02
 N:                     909         909         909         909         909         909         909         909         909         909
                        909         909         909         909

 P VAL.:         1.0000E+00  1.0000E+00  1.0000E+00  1.0000E+00  8.2399E-01  3.9208E-01  1.1371E-01  1.7353E-07  6.0358E-01  9.4497E-01
                 8.5815E-01  7.8013E-01  8.1000E-03  8.4030E-01

 ETASHRINKSD(%)  1.0000E+02  1.0000E+02  1.0000E+02  1.0000E+02  3.3895E+01  1.5941E+01  2.4615E+01  2.5862E+01  1.1405E+01  7.0958E+01
                 6.4700E+01  6.3499E+01  7.8029E+01  5.9810E+01
 ETASHRINKVR(%)  1.0000E+02  1.0000E+02  1.0000E+02  1.0000E+02  5.6302E+01  2.9340E+01  4.3171E+01  4.5036E+01  2.1509E+01  9.1566E+01
                 8.7539E+01  8.6677E+01  9.5173E+01  8.3848E+01
 EBVSHRINKSD(%)  0.0000E+00  0.0000E+00  0.0000E+00  0.0000E+00  3.3295E+01  1.3903E+01  2.5508E+01  2.5906E+01  1.1714E+01  7.0977E+01
                 6.4919E+01  6.2919E+01  7.9070E+01  6.0068E+01
 EBVSHRINKVR(%)  0.0000E+00  0.0000E+00  0.0000E+00  0.0000E+00  5.5504E+01  2.5872E+01  4.4509E+01  4.5102E+01  2.2057E+01  9.1577E+01
                 8.7693E+01  8.6250E+01  9.5619E+01  8.4055E+01
 EPSSHRINKSD(%)  1.6243E+01
 EPSSHRINKVR(%)  2.9848E+01


 TOTAL DATA POINTS NORMALLY DISTRIBUTED (N):         9826
 N*LOG(2PI) CONSTANT TO OBJECTIVE FUNCTION:    18058.980054538228
 OBJECTIVE FUNCTION VALUE WITHOUT CONSTANT:    85047.884460543748
 OBJECTIVE FUNCTION VALUE WITH CONSTANT:       103106.86451508198
 REPORTED OBJECTIVE FUNCTION DOES NOT CONTAIN CONSTANT

 TOTAL EFFECTIVE ETAS (NIND*NETA):                          4895


 #TERE:
 Elapsed estimation  time in seconds:  2572.55
 Elapsed covariance  time in seconds:   164.31
 Elapsed postprocess time in seconds:    29.11

 ********************               FIRST ORDER CONDITIONAL ESTIMATION WITH INTERACTION              ********************
 #OBJT:**************                       MINIMUM VALUE OF OBJECTIVE FUNCTION                      ********************
 #OBJV:********************************************    85047.884       **************************************************

 ********************               FIRST ORDER CONDITIONAL ESTIMATION WITH INTERACTION              ********************
 ********************                             FINAL PARAMETER ESTIMATE                           ********************

 THETA - VECTOR OF FIXED EFFECTS PARAMETERS   *********
         TH 1      TH 2      TH 3      TH 4      TH 5      TH 6      TH 7      TH 8      TH 9      TH10      TH11      TH12
          TH13      TH14      TH15      TH16      TH17      TH18      TH19      TH20      TH21      TH22      TH23      TH24
         TH25      TH26      TH27      TH28      TH29      TH30      TH31      TH32      TH33      TH34      TH35      TH36
          TH37      TH38      TH39      TH40      TH41      TH42      TH43      TH44      TH45      TH46      TH47      TH48
         TH49      TH50      TH51      TH52      TH53      TH54      TH55      TH56      TH57      TH58      TH59      TH60
          TH61      TH62      TH63      TH64      TH65      TH66      TH67      TH68      TH69      TH70      TH71      TH72
         TH73      TH74      TH75      TH76      TH77      TH78      TH79      TH80      TH81      TH82      TH83      TH84
          TH85      TH86      TH87      TH88      TH89      TH90      TH91      TH92      TH93      TH94      TH95      TH96
         3.67E+00  3.65E+00  3.99E+00  3.74E+00  5.70E-01  3.72E+00  3.37E+00 -6.13E-01  2.52E+00  1.27E-01  3.07E+00  1.22E+00
         -9.90E-01  2.22E+00  2.84E+00  2.09E-01  1.00E+00  0.00E+00 -3.45E-01  0.00E+00 -3.64E-01  1.53E-01  6.31E-01 -3.02E+00
         7.61E-01 -7.06E-01  1.02E+00  3.11E+00  4.53E-01  0.00E+00 -4.64E-01 -1.47E-01 -4.42E-01  2.61E-01  0.00E+00 -1.48E+00
          0.00E+00 -2.73E-01 -3.30E-01  4.38E-01 -9.65E-01 -3.47E-01 -7.76E-01 -4.87E-01 -1.90E+00 -1.48E+00  6.36E-01 -2.12E-01
         2.40E+00  1.23E-01 -3.49E-01  0.00E+00  0.00E+00  6.56E-01  2.81E-01  2.00E+00  2.77E-01 -1.59E+00 -1.15E+00 -1.10E+00
          2.14E-01  0.00E+00 -5.60E-01 -6.99E-01 -4.77E-01 -5.30E-01  4.91E-01 -1.91E+00 -1.13E+00 -6.36E-01 -4.27E-01 -1.68E-01
        -3.83E-01  6.95E-01  9.56E-01  1.44E+00  3.12E-01  1.08E+00  4.78E-01  4.40E-01  2.83E-01  8.37E-01 -2.25E-01 -5.33E-01
          3.67E-01  2.23E-01  5.55E-01  9.29E-02 -9.14E-01  1.94E-01 -2.16E+00  1.23E+00  2.52E-01  1.39E+00  4.83E-01 -8.25E-01

 OMEGA - COV MATRIX FOR RANDOM EFFECTS - ETAS  ********
         ETA1      ETA2      ETA3      ETA4      ETA5      ETA6      ETA7      ETA8      ETA9      ET10      ET11      ET12
          ET13      ET14
 ETA1
+        0.00E+00
 ETA2
+        0.00E+00  0.00E+00
 ETA3
+        0.00E+00  0.00E+00  0.00E+00
 ETA4
+        0.00E+00  0.00E+00  0.00E+00  0.00E+00
 ETA5
+        0.00E+00  0.00E+00  0.00E+00  0.00E+00  4.29E-01
 ETA6
+        0.00E+00  0.00E+00  0.00E+00  0.00E+00  0.00E+00  5.13E-02
 ETA7
+        0.00E+00  0.00E+00  0.00E+00  0.00E+00  0.00E+00  0.00E+00  4.24E-01
 ETA8
+        0.00E+00  0.00E+00  0.00E+00  0.00E+00  0.00E+00  0.00E+00  0.00E+00  1.05E-01
 ETA9
+        0.00E+00  0.00E+00  0.00E+00  0.00E+00  0.00E+00  0.00E+00  0.00E+00  0.00E+00  1.00E+00
 ET10
+        0.00E+00  0.00E+00  0.00E+00  0.00E+00  0.00E+00  0.00E+00  0.00E+00  0.00E+00  0.00E+00  1.87E-01
         ETA1      ETA2      ETA3      ETA4      ETA5      ETA6      ETA7      ETA8      ETA9      ET10      ET11      ET12
          ET13      ET14
 ET11
+        0.00E+00  0.00E+00  0.00E+00  0.00E+00  0.00E+00  0.00E+00  0.00E+00  0.00E+00  0.00E+00  0.00E+00  6.56E-02
 ET12
+        0.00E+00  0.00E+00  0.00E+00  0.00E+00  0.00E+00  0.00E+00  0.00E+00  0.00E+00  0.00E+00  0.00E+00  0.00E+00  5.03E-01
 ET13
+        0.00E+00  0.00E+00  0.00E+00  0.00E+00  0.00E+00  0.00E+00  0.00E+00  0.00E+00  0.00E+00  0.00E+00  0.00E+00  0.00E+00
          7.20E-02
 ET14
+        0.00E+00  0.00E+00  0.00E+00  0.00E+00  0.00E+00  0.00E+00  0.00E+00  0.00E+00  0.00E+00  0.00E+00  0.00E+00  0.00E+00
          0.00E+00  7.80E-01

 SIGMA - COV MATRIX FOR RANDOM EFFECTS - EPSILONS  ****
         EPS1
 EPS1
+        1.00E+00

 OMEGA - CORR MATRIX FOR RANDOM EFFECTS - ETAS  *******
         ETA1      ETA2      ETA3      ETA4      ETA5      ETA6      ETA7      ETA8      ETA9      ET10      ET11      ET12
          ET13      ET14
 ETA1
+        0.00E+00
 ETA2
+        0.00E+00  0.00E+00
 ETA3
+        0.00E+00  0.00E+00  0.00E+00
 ETA4
+        0.00E+00  0.00E+00  0.00E+00  0.00E+00
 ETA5
+        0.00E+00  0.00E+00  0.00E+00  0.00E+00  6.55E-01
 ETA6
+        0.00E+00  0.00E+00  0.00E+00  0.00E+00  0.00E+00  2.26E-01
 ETA7
+        0.00E+00  0.00E+00  0.00E+00  0.00E+00  0.00E+00  0.00E+00  6.51E-01
 ETA8
+        0.00E+00  0.00E+00  0.00E+00  0.00E+00  0.00E+00  0.00E+00  0.00E+00  3.24E-01
 ETA9
+        0.00E+00  0.00E+00  0.00E+00  0.00E+00  0.00E+00  0.00E+00  0.00E+00  0.00E+00  1.00E+00
 ET10
+        0.00E+00  0.00E+00  0.00E+00  0.00E+00  0.00E+00  0.00E+00  0.00E+00  0.00E+00  0.00E+00  4.33E-01
 ET11
+        0.00E+00  0.00E+00  0.00E+00  0.00E+00  0.00E+00  0.00E+00  0.00E+00  0.00E+00  0.00E+00  0.00E+00  2.56E-01
 ET12
+        0.00E+00  0.00E+00  0.00E+00  0.00E+00  0.00E+00  0.00E+00  0.00E+00  0.00E+00  0.00E+00  0.00E+00  0.00E+00  7.09E-01
 ET13
+        0.00E+00  0.00E+00  0.00E+00  0.00E+00  0.00E+00  0.00E+00  0.00E+00  0.00E+00  0.00E+00  0.00E+00  0.00E+00  0.00E+00
          2.68E-01
 ET14
+        0.00E+00  0.00E+00  0.00E+00  0.00E+00  0.00E+00  0.00E+00  0.00E+00  0.00E+00  0.00E+00  0.00E+00  0.00E+00  0.00E+00
          0.00E+00  8.83E-01

 SIGMA - CORR MATRIX FOR RANDOM EFFECTS - EPSILONS  ***
         EPS1
 EPS1
+        1.00E+00

 ********************               FIRST ORDER CONDITIONAL ESTIMATION WITH INTERACTION              ********************
 ********************                            STANDARD ERROR OF ESTIMATE                          ********************

 THETA - VECTOR OF FIXED EFFECTS PARAMETERS   *********
         TH 1      TH 2      TH 3      TH 4      TH 5      TH 6      TH 7      TH 8      TH 9      TH10      TH11      TH12
          TH13      TH14      TH15      TH16      TH17      TH18      TH19      TH20      TH21      TH22      TH23      TH24
         TH25      TH26      TH27      TH28      TH29      TH30      TH31      TH32      TH33      TH34      TH35      TH36
          TH37      TH38      TH39      TH40      TH41      TH42      TH43      TH44      TH45      TH46      TH47      TH48
         TH49      TH50      TH51      TH52      TH53      TH54      TH55      TH56      TH57      TH58      TH59      TH60
          TH61      TH62      TH63      TH64      TH65      TH66      TH67      TH68      TH69      TH70      TH71      TH72
         TH73      TH74      TH75      TH76      TH77      TH78      TH79      TH80      TH81      TH82      TH83      TH84
          TH85      TH86      TH87      TH88      TH89      TH90      TH91      TH92      TH93      TH94      TH95      TH96
        ......... ......... ......... .........  6.67E-02  2.31E-02  6.32E-02  3.31E-02  1.18E-01  6.97E-02  5.79E-02  1.07E-01
          7.70E-02  1.07E-01  6.34E-02  1.73E-03 ......... .........  9.70E-02 .........  1.68E-01  4.90E-02  1.84E-01  1.03E-01
         3.27E-02  1.79E-01  4.74E-02  2.17E-01  4.34E-02 .........  4.26E-02  4.33E-02  5.37E-02  9.73E-02 ......... .........
         .........  2.34E-01  2.72E-01  1.49E-01  2.72E-01  1.69E-01  3.91E-01  1.92E-01  2.41E-01  2.94E-01  2.45E-01  1.31E-01
         2.00E-01  5.12E-02  2.92E-01 ......... .........  1.09E-01  3.09E-02  1.92E-01  9.70E-02  5.87E-01  3.73E-01  8.53E-01
          7.68E-02 ......... .........  2.74E-01  8.01E-02 .........  7.51E-02  1.02E+00 ......... .........  1.87E-01  1.01E-01
         3.99E-01 .........  4.42E-02  6.05E-02  2.69E-01  1.94E-01  2.13E-01  6.69E-02  3.97E-02  9.94E-02  8.16E-02  9.46E-02
          1.69E-01  6.95E-02  1.05E-01  3.61E-03  1.91E-01  5.86E-02  2.17E-01  2.47E-01  1.03E-01  1.41E-01  1.36E-01  4.08E-01

 OMEGA - COV MATRIX FOR RANDOM EFFECTS - ETAS  ********
         ETA1      ETA2      ETA3      ETA4      ETA5      ETA6      ETA7      ETA8      ETA9      ET10      ET11      ET12
          ET13      ET14
 ETA1
+       .........
 ETA2
+       ......... .........
 ETA3
+       ......... ......... .........
 ETA4
+       ......... ......... ......... .........
 ETA5
+       ......... ......... ......... .........  3.71E-02
 ETA6
+       ......... ......... ......... ......... .........  3.24E-03
 ETA7
+       ......... ......... ......... ......... ......... .........  3.17E-02
 ETA8
+       ......... ......... ......... ......... ......... ......... .........  7.81E-03
 ETA9
+       ......... ......... ......... ......... ......... ......... ......... ......... .........
 ET10
+       ......... ......... ......... ......... ......... ......... ......... ......... .........  4.03E-02
         ETA1      ETA2      ETA3      ETA4      ETA5      ETA6      ETA7      ETA8      ETA9      ET10      ET11      ET12
          ET13      ET14
 ET11
+       ......... ......... ......... ......... ......... ......... ......... ......... ......... .........  1.10E-02
 ET12
+       ......... ......... ......... ......... ......... ......... ......... ......... ......... ......... .........  8.83E-02
 ET13
+       ......... ......... ......... ......... ......... ......... ......... ......... ......... ......... ......... .........
          2.85E-02
 ET14
+       ......... ......... ......... ......... ......... ......... ......... ......... ......... ......... ......... .........
         .........  9.37E-02

 SIGMA - COV MATRIX FOR RANDOM EFFECTS - EPSILONS  ****
         EPS1
 EPS1
+       .........

 OMEGA - CORR MATRIX FOR RANDOM EFFECTS - ETAS  *******
         ETA1      ETA2      ETA3      ETA4      ETA5      ETA6      ETA7      ETA8      ETA9      ET10      ET11      ET12
          ET13      ET14
 ETA1
+       .........
 ETA2
+       ......... .........
 ETA3
+       ......... ......... .........
 ETA4
+       ......... ......... ......... .........
 ETA5
+       ......... ......... ......... .........  2.83E-02
 ETA6
+       ......... ......... ......... ......... .........  7.15E-03
 ETA7
+       ......... ......... ......... ......... ......... .........  2.43E-02
 ETA8
+       ......... ......... ......... ......... ......... ......... .........  1.21E-02
 ETA9
+       ......... ......... ......... ......... ......... ......... ......... ......... .........
 ET10
+       ......... ......... ......... ......... ......... ......... ......... ......... .........  4.66E-02
 ET11
+       ......... ......... ......... ......... ......... ......... ......... ......... ......... .........  2.15E-02
 ET12
+       ......... ......... ......... ......... ......... ......... ......... ......... ......... ......... .........  6.23E-02
 ET13
+       ......... ......... ......... ......... ......... ......... ......... ......... ......... ......... ......... .........
          5.32E-02
 ET14
+       ......... ......... ......... ......... ......... ......... ......... ......... ......... ......... ......... .........
         .........  5.30E-02

 SIGMA - CORR MATRIX FOR RANDOM EFFECTS - EPSILONS  ***
         EPS1
 EPS1
+       .........
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
 ********************               FIRST ORDER CONDITIONAL ESTIMATION WITH INTERACTION              ********************
 ********************                      EIGENVALUES OF COR MATRIX OF ESTIMATE                     ********************

             1         2         3         4         5         6         7         8         9        10        11        12
             13        14        15        16        17        18        19        20        21        22        23        24
            25        26        27        28        29        30        31        32        33        34        35        36
             37        38        39        40        41        42        43        44        45        46        47        48
            49        50        51        52        53        54        55        56        57        58        59        60
             61        62        63        64        65        66        67        68        69        70        71        72
            73        74        75        76        77        78        79        80        81        82        83        84
             85        86
         2.96E-02  7.87E-02  8.19E-02  8.38E-02  9.60E-02  1.11E-01  1.60E-01  1.67E-01  1.72E-01  1.90E-01  2.06E-01  2.28E-01
          2.41E-01  2.55E-01  2.59E-01  2.87E-01  3.03E-01  3.11E-01  3.16E-01  3.28E-01  3.39E-01  3.44E-01  3.69E-01  3.85E-01
         3.99E-01  4.08E-01  4.19E-01  4.28E-01  4.43E-01  4.81E-01  4.91E-01  5.19E-01  5.43E-01  5.61E-01  5.84E-01  5.92E-01
          6.11E-01  6.25E-01  6.43E-01  6.57E-01  6.95E-01  7.16E-01  7.37E-01  7.67E-01  7.79E-01  7.94E-01  8.07E-01  8.47E-01
         8.55E-01  8.65E-01  9.00E-01  9.09E-01  9.45E-01  9.69E-01  9.84E-01  1.00E+00  1.01E+00  1.06E+00  1.09E+00  1.12E+00
          1.14E+00  1.19E+00  1.21E+00  1.26E+00  1.29E+00  1.32E+00  1.37E+00  1.42E+00  1.46E+00  1.48E+00  1.54E+00  1.59E+00
         1.63E+00  1.73E+00  1.82E+00  1.90E+00  1.97E+00  2.13E+00  2.21E+00  2.35E+00  2.46E+00  2.74E+00  3.03E+00  3.66E+00
          4.71E+00  5.78E+00
 Elapsed finaloutput time in seconds:     1.82
 #CPUT: Total CPU Time in Seconds,   160095.404
