23/02/2022
08:02
;; 1. Based on: 14
;; 2. Description:
;;    IIV on KOUT- prelim Cohort 3 CD4+
;; 3. Label:
;;    1 cpt input turnover model
;; 4. Structural model:
;;    1 cpt input turnover model
;; 5. Covariate model:
;; 6. Inter-individual variability:
;;    CL, V
;; 7. Inter-occasion variability:
;;    NONE
;; 8. Residual variability:
;;    Additive on log scale
;; 9. Estimation:
;;    FOCE
$PROBLEM    ABCURO PKPD MODELING
$INPUT      ID SUBJID=DROP TIME DV BQL EVID AMT TYPE DAY COUNTBASE
            COUNTCFB COUNTPCFB PLACEBO DOSE WT CL V KA LNDV
$DATA      nm_pkpd_cohort2b_indpk.csv IGNORE=@ IGNORE=(BQL.EQ.1)
            IGNORE=(TYPE.EQ.1) IGNORE=(TYPE.GT.2)
            IGNORE=(PLACEBO.EQ.1)
$SUBROUTINE ADVAN13 TOL=12
$ABBREVIATED COMRES=1
$MODEL      COMP(depot,DEFDOSE) COMP(PLASMA) COMP(TC1) COMP(TC2)
            COMP(TC3) COMP(KLRG1PLASMA)
$PK

TVPD0  = THETA(1)
TVTHALF = THETA(2)

; PK compartment
F1 = EXP(1.1)/(1+EXP(1.1)) ; this was fixed to that value in run4

;P D model components
MU_1 = TVPD0 ; PD0
MU_2 = TVTHALF ; KOUT
MU_3 = THETA(3) ; EMAX
MU_4 = THETA(4) ; EC50
MU_5 = THETA(5) ; KTR

ERR_ADD = THETA(6)
ERR_PROP = THETA(7)

; Effect parameters and initiation
PD0  = EXP(MU_1+ETA(1))
THALF = EXP(MU_2+ETA(2))
EMAX = EXP(MU_3+ETA(3)) ; simple scalar of drug effect
KOUT = LOG(2)/THALF
MAXEFF = (1/(1-1/100)-1)

KIN = KOUT * PD0
A_0(6) = PD0

EC50 = EXP(MU_4+ETA(4))
KTR = EXP(MU_5+ETA(5))

; Capture dose time
IF(NEWIND.NE.2) COM(1)=TIME
IF(EVID.EQ.1) COM(1)=TIME

$DES

C2 = A(2)/V * 1000

DADT(1) = - KA*A(1)
DADT(2) =   KA*A(1) - CL*C2
DADT(3) = KIN - KTR*A(3)
DADT(4) = KTR*A(3) - KTR*A(4)
DADT(5) = KTR*A(4) - KTR*A(5)
DADT(6) = KTR*A(5) - KOUT*A(6) - EMAX*C2/(EC50+C2)

$ERROR
IPRED = A(6)
AEFF = IPRED
W = sqrt(ERR_ADD**2 + ERR_PROP**2 * IPRED**2)

IF(IPRED.LT.0) THEN
  IPRED=0
  W=1
ENDIF

Y = IPRED+W*EPS(1)
IRES = DV - IPRED
IWRES = IRES/W

$THETA  (1,3.09018,7) ; PD0; Base count; LOG
$THETA  6.36184 ; THALF KOUT; h; LOG
$THETA  (-5,-1.5075,5) ; EMAX; prlwstz; LOG
$THETA  1 FIX ; EC50; ng/L; LOG
$THETA  -1.53008 ; KTR; 1/h; LOG
$THETA  0 FIX ; Additive error (log); cells/L; LIN
$THETA  0.404737 ; Proportional error; ; LIN
$OMEGA  0.416064  ;   IIV(PD0)
 0.09  ;  IIV(KOUT)
 0.359259  ;  IIV(EMAX)
 0  FIX  ;  IIV(EC50)
 0  FIX  ;   IIV(KTR)
$SIGMA  1  FIX  ;      SIGMA
$ESTIMATION METHOD=COND INTER NSIG=3 SIGL=9 MAXEVALS=9999 PRINT=1
            NOABORT
$COVARIANCE PRINT=E UNCONDITIONAL MATRIX=S
$TABLE      ID TIME EVID PRED IPRED RES IRES WRES IWRES CWRES DV MDV
            C2 FORMAT=s1PG15.8 NOAPPEND NOPRINT ONEHEADER FILE=sdtab15
$TABLE      ID DOSE V CL KA AEFF ETAS(1:LAST) FORMAT=s1PE13.7 NOAPPEND
            ONEHEADER NOPRINT FORMAT=s1PG15.8 FILE=patab15
$TABLE      ID TIME DV IPRED EVID CWRES IWRES DOSE WT AMT
            FORMAT=S1PG15.8 NOAPPEND ONEHEADER NOPRINT FILE=cotab15
$TABLE      ID TYPE NOPRINT ONEHEADER FORMAT=S1PG15.8 FILE=catab15

NM-TRAN MESSAGES
 WARNINGS AND ERRORS (IF ANY) FOR PROBLEM    1
 (WARNING  2) NM-TRAN INFERS THAT THE DATA ARE POPULATION.
 (WARNING  48) DES-DEFINED ITEMS ARE COMPUTED ONLY WHEN EVENT TIME
 INCREASES. E.G., DISPLAYED VALUES ASSOCIATED WITH THE FIRST EVENT RECORD
 OF AN INDIVIDUAL RECORD ARE COMPUTED WITH (THE LAST ADVANCE TO) AN EVENT
 TIME OF THE PRIOR INDIVIDUAL RECORD.

1NONLINEAR MIXED EFFECTS MODEL PROGRAM (NONMEM) VERSION 7.4.3
 ORIGINALLY DEVELOPED BY STUART BEAL, LEWIS SHEINER, AND ALISON BOECKMANN
 CURRENT DEVELOPERS ARE ROBERT BAUER, ICON DEVELOPMENT SOLUTIONS,
 AND ALISON BOECKMANN. IMPLEMENTATION, EFFICIENCY, AND STANDARDIZATION
 PERFORMED BY NOUS INFOSYSTEMS.
 PROBLEM NO.:         1
 ABCURO PKPD MODELING
 TOT. NO. OF OBS RECS:       83
 TOT. NO. OF INDIVIDUALS:        7
 GENERAL NONLINEAR KINETICS MODEL WITH STIFF/NONSTIFF EQUATIONS (LSODA, ADVAN13)
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 #TBLN:      1
 #METH: First Order Conditional Estimation with Interaction
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
 #TERM:
0MINIMIZATION TERMINATED
 DUE TO ROUNDING ERRORS (ERROR=134)
 NO. OF FUNCTION EVALUATIONS USED:      398
 NO. OF SIG. DIGITS UNREPORTABLE

 ETABAR IS THE ARITHMETIC MEAN OF THE ETA-ESTIMATES,
 AND THE P-VALUE IS GIVEN FOR THE NULL HYPOTHESIS THAT THE TRUE MEAN IS 0.

 ETABAR:         1.9495E-01 -7.6718E-03  4.4262E-02  0.0000E+00  0.0000E+00
 SE:             2.2172E-01  4.6541E-02  1.9578E-01  0.0000E+00  0.0000E+00
 N:                       7           7           7           7           7

 P VAL.:         3.7927E-01  8.6907E-01  8.2114E-01  1.0000E+00  1.0000E+00

 ETASHRINKSD(%)  1.7642E+00  4.7299E+01  6.6502E+00  1.0000E+02  1.0000E+02
 ETASHRINKVR(%)  3.4973E+00  7.2226E+01  1.2858E+01  1.0000E+02  1.0000E+02
 EBVSHRINKSD(%)  2.7369E+00  4.5733E+01  1.8131E+01  0.0000E+00  0.0000E+00
 EBVSHRINKVR(%)  5.3989E+00  7.0551E+01  3.2975E+01  0.0000E+00  0.0000E+00
 EPSSHRINKSD(%)  1.0000E-10
 EPSSHRINKVR(%)  1.0000E-10


 TOTAL DATA POINTS NORMALLY DISTRIBUTED (N):           83
 N*LOG(2PI) CONSTANT TO OBJECTIVE FUNCTION:    152.54379651197567
 OBJECTIVE FUNCTION VALUE WITHOUT CONSTANT:    418.92077916200395
 OBJECTIVE FUNCTION VALUE WITH CONSTANT:       571.46457567397965
 REPORTED OBJECTIVE FUNCTION DOES NOT CONTAIN CONSTANT

 TOTAL EFFECTIVE ETAS (NIND*NETA):                            21


 #TERE:
 Elapsed estimation  time in seconds:   302.66
 Elapsed covariance  time in seconds:    11.21
 Elapsed postprocess time in seconds:     1.10

 ********************               FIRST ORDER CONDITIONAL ESTIMATION WITH INTERACTION              ********************
 #OBJT:**************                       MINIMUM VALUE OF OBJECTIVE FUNCTION                      ********************
 #OBJV:********************************************      418.921       **************************************************

 ********************               FIRST ORDER CONDITIONAL ESTIMATION WITH INTERACTION              ********************
 ********************                             FINAL PARAMETER ESTIMATE                           ********************

 THETA - VECTOR OF FIXED EFFECTS PARAMETERS   *********
         TH 1      TH 2      TH 3      TH 4      TH 5      TH 6      TH 7
         3.09E+00  6.30E+00 -1.51E+00  1.00E+00 -2.08E+00  0.00E+00  4.05E-01

 OMEGA - COV MATRIX FOR RANDOM EFFECTS - ETAS  ********
         ETA1      ETA2      ETA3      ETA4      ETA5
 ETA1
+        4.16E-01
 ETA2
+        0.00E+00  6.37E-02
 ETA3
+        0.00E+00  0.00E+00  3.59E-01
 ETA4
+        0.00E+00  0.00E+00  0.00E+00  0.00E+00
 ETA5
+        0.00E+00  0.00E+00  0.00E+00  0.00E+00  0.00E+00

 SIGMA - COV MATRIX FOR RANDOM EFFECTS - EPSILONS  ****
         EPS1
 EPS1
+        1.00E+00

 OMEGA - CORR MATRIX FOR RANDOM EFFECTS - ETAS  *******
         ETA1      ETA2      ETA3      ETA4      ETA5
 ETA1
+        6.45E-01
 ETA2
+        0.00E+00  2.52E-01
 ETA3
+        0.00E+00  0.00E+00  5.99E-01
 ETA4
+        0.00E+00  0.00E+00  0.00E+00  0.00E+00
 ETA5
+        0.00E+00  0.00E+00  0.00E+00  0.00E+00  0.00E+00

 SIGMA - CORR MATRIX FOR RANDOM EFFECTS - EPSILONS  ***
         EPS1
 EPS1
+        1.00E+00

 ********************               FIRST ORDER CONDITIONAL ESTIMATION WITH INTERACTION              ********************
 ********************                            STANDARD ERROR OF ESTIMATE                          ********************

 THETA - VECTOR OF FIXED EFFECTS PARAMETERS   *********
         TH 1      TH 2      TH 3      TH 4      TH 5      TH 6      TH 7
         5.09E+03  3.86E+03  2.90E+03 .........  1.06E+05 .........  1.11E+03

 OMEGA - COV MATRIX FOR RANDOM EFFECTS - ETAS  ********
         ETA1      ETA2      ETA3      ETA4      ETA5
 ETA1
+        8.22E+03
 ETA2
+       .........  5.01E+03
 ETA3
+       ......... .........  3.65E+04
 ETA4
+       ......... ......... ......... .........
 ETA5
+       ......... ......... ......... ......... .........

 SIGMA - COV MATRIX FOR RANDOM EFFECTS - EPSILONS  ****
         EPS1
 EPS1
+       .........

 OMEGA - CORR MATRIX FOR RANDOM EFFECTS - ETAS  *******
         ETA1      ETA2      ETA3      ETA4      ETA5
 ETA1
+        6.37E+03
 ETA2
+       .........  9.92E+03
 ETA3
+       ......... .........  3.05E+04
 ETA4
+       ......... ......... ......... .........
 ETA5
+       ......... ......... ......... ......... .........

 SIGMA - CORR MATRIX FOR RANDOM EFFECTS - EPSILONS  ***
         EPS1
 EPS1
+       .........
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
 ********************               FIRST ORDER CONDITIONAL ESTIMATION WITH INTERACTION              ********************
 ********************                      EIGENVALUES OF COR MATRIX OF ESTIMATE                     ********************

             1         2         3         4         5         6         7         8
        -8.07E-18  2.68E-10  4.28E-10  5.04E-10  1.28E-09  2.77E-08  4.40E-08  8.00E+00
 Elapsed finaloutput time in seconds:     0.07
 #CPUT: Total CPU Time in Seconds,      315.813
